* fichier : mazars_biaxial.dgibi
************************************************************************
*      Cas test elementaire pour la loi d'endommagement de Mazars      *
*          Essai biaxial de traction ou compression monotones          *
*                                                                      *
* Le test est realise avec plusieurs modes de calcul :                 *
*   1) 3D volumique                                                    *
*   2) 2D contraintes planes                                           *
*                                                                      *
* Selon deux modes d'integration du comportement                       *
* realises successivement dans la boucle BCALC :                       *
*   passage 1 : Cast3M                                                 *
*   passage 2 : MFront (pas actif a date)                              *
*                                                                      *
* ITRAC1 : VRAI => affichage resultats                                 *
* IPSC1  : VRAI => affichage resultats dans un PostScript Couleur      *
************************************************************************

DIVERS = 'VENV' 'CASTEM_DIVERS' ;

** Options
** - pour les traces
ITRAC1 = VRAI ;
IPSC1  = VRAI ;
SI IPSC1 ;
  OPTI 'TRAC' 'PSC' ;
FINSI ;
** - pour la sauvegarde des résultats de calcul Cast3M et/ou MFront
ISAUV = FAUX ;
SI ISAUV ;
  str1 = 'mazars_biaxial_' ;
FINSI ;

** Initialisation sortie sur Erreur 1152 "Solution calculee non conforme par rapport a la solution de reference"
IERR = FAUX ;

** Liste des modes de calcul a traiter
lcas = LECT 1 2 ;
*lcas = LECT 1 ; COMM '3D volumique' ;
*lcas = LECT 2 ; COMM '2D contraintes planes' ;

** Parametres geometriques
long = 1. ;
epai = 0.1 ;

** Parametres materiau
you   = 20.E9 ;
nu    = 0.2 ;
epd0  = 8.E-5 ;
at    = 1. ;
ac    = 1.5 ;
bt    = 8000. ;
bc    = 1550. ;
beta  = 1. ;
xrho  = 0. ;
xalph = 0. ;
xtalp = 0. ;
xtref = 0. ;

OPTI ECHO 0 ;
SAUT 1 lign ;
mess 'Parametres' ;
mess '==========';
SAUT 1 lign ;
mess 'Parametre de taille de l element' ;
mess '- H = arete du cube : long (m)' ' ' long ;
SAUT 1 lign ;
mess 'Coef. elastiques' ;
mess '- Module d Young         : you (Pa)' you ;
mess '- Coefficient de Poisson : nu' ' ' ' ' ' ' ' ' ' ' ' ' nu ;
SAUT 1 lign ;
mess 'Coef. Mazars' ;
mess '- KTR0 : epd0' ' ' epd0 ;
mess '- ATRA : at' ' ' ' ' ' ' at ;
mess '- BTRA : bt' ' ' ' ' ' ' bt ;
mess '- ACOM : ac' ' ' ' ' ' ' ac ;
mess '- BCOM : bc' ' ' ' ' ' ' bc ;
mess '- BETA : beta' ' ' beta ;
SAUT 1 lign ;
OPTI ECHO 1 ;
*opti donn 5;

** Legende courbes
  tdess = 'TABLE' ;
  tdess.'TITRE' = 'TABLE' ;
  tdess. 1 = MOT 'MARQ LOSA' ;
  tdess. 2 = MOT 'MARQ XS CROI' ;
  tdess.'TITRE'. 2 = MOT 'Reference' ;

** Oeil en 3D_V (trace a conserver pour conserver l'oeil)
  OPTI 'DIME' 3 'MODE' 'TRID' 'ELEM' 'CUB8' ;
  rep1 = @REPERE (-0.55 -0.55 0.) 'TURQ' ;
  TRAC rep1 'TITR' 'Repere 3D';
  o1 = VALE OEIL ;
  xo1 yo1 zo1 = COOR o1 ;

** Procedure PERSO1 pour stopper le calcul sur critere de ruine (REX : ISOUSPAS>ou=1 et Increm.Défo.>ou=2.E-3)
DEBP PERSO1 t1*'TABLE' ;
  SI (EGA t1.'PERSO1_APPEL' 2) ;
*mess 'Proc PERSO1';
*mess '===========';
*mess 'SOUS-PAS' ' ' T1.'WTABLE'.'ISOUSPAS' ' DPSMAX' ' ' T1.'WTABLE'.'DPSMAX' ;
    t1.'WTABLE' . 'ARRET' = ('>EG' T1.'WTABLE'.'ISOUSPAS' 1)
                       'OU' ('>EG' T1.'WTABLE'.'DPSMAX' 2.E-3) ;
  FINSI;
FINP ;

** Procedure EC_REL pour calculer la moyenne intergrale de la courbe écart relatif (Calc - Ref) / Ref
DEBP EC_REL nsig ev_ref ev_cal nx ndime log_dess tcare ;
  xref = EXTR ev_ref 'ABSC' ;
  yref = EXTR ev_ref 'ORDO' ;
  xcal = EXTR ev_cal 'ABSC' ;
  ycal = EXTR ev_cal 'ORDO' ;
  xref2 = xcal ;
  yref2 = IPOL xref2 ev_ref ;
*mess 'Avant suppression';
*mess 'ycal';list ycal;
*mess 'yref2';list yref2;
  n_supr = 0 ;
  REPE b_y (DIME ycal) ;
    yy = EXTR ycal &b_y ;
    SI (yy 'EGA' 0. 1.E-2) ;
      n_supr = &b_y ;
    FINSI ;
  FIN b_y ;
  SI (n_supr NEG 0) ;
    ycal  = ENLE ycal  n_supr ;
    yref2 = ENLE yref2 n_supr ;
    xcal  = ENLE xcal  n_supr ;
*mess 'Apres suppression du terme' ' ' n_supr ;
*mess 'ycal';list ycal;
*mess 'yref2';list yref2;
  FINSI ;
  ler1 = ABS ((ycal - yref2) / yref2) ;
*mess 'ler1';list ler1;
  ny = CHAI '|Ec.rel|' nsig ;
  eer1 = EVOL 'ORAN' 'MANU' nx xcal ny ler1 ;
  dx = (EXTR xcal (DIME xcal)) - (EXTR xcal 1) ;
  SI (n_supr NEG 0) ;
    mer1 = (INTG eer1) / dx ;
  SINON ;
    mer1 = 0. ;
  FINSI ;
* tit1 = CHAI str4 ' ' ndime ' ' nsig ' Val.abs.Ec.rel.|(Calc-Ref)/Ref| Contr. vs' ' ' nx ', moy.int.|Ecart|' ' ' mer1 ;
  tit1 = CHAI str4 ' ' ndime ' |Ec.rel|=|(Cal-Ref)/Ref|' nsig ' vs' ' ' nx ', Moy.int.|Ec.rel|' ' ' mer1 ;
  SI ITRAC1 ;
    DESS (ev_cal et ev_ref) 'TITR' tit1 'LEGE' 'SE' tcare ;
    DESS eer1 'TITR' tit1 ;
  FINSI ;
FINP mer1 ;

** Procedure SOL_REF pour restituer la solution de référence d'une configuration géométrique donnée
DEBP SOL_REF nom_fic ;
  OPTI REST nom_fic ;
  REST ;
  ev1 = ev_ref ;
  ev2 = evsmxx_ref ;
  ev3 = evsmyy_ref ;
FINP ev1 ev2 ev3;


REPE BCALC 2 ;
*============= A ENLEVER pour realiser le calcul MFront =============
SI (NEG &BCALC 1) ;
  QUIT BCALC;
FINSI ;
*========================== fin A ENLEVER ===========================
** Distinction des résultats de calcul Cast3M ou MFront (Ref, PostScript, sauvegarde)
SI (EGA &BCALC 1) ;
  str3 = 'Cast3M' ;
  FIC1   = 'CHAI' DIVERS '/mazars_biaxial_Ref_1342.out';
  FIC2   = 'CHAI' DIVERS '/mazars_biaxial_Ref_1242c.out';
  OPTI ECHO 0 ;
  SAUT 1 LIGN ;
  MESS ' ===================  Comportement materiau : Cast3M  ====================';
  MESS ' Reference 3D_V  :' ' ' FIC1 ;
  MESS ' Reference 2D_CP :' ' ' FIC2 ;
  SAUT 1 LIGN ;
SINO ;
  str3 = 'MFront' ;
* FIC1   = 'CHAI' DIVERS '/mazars_biaxial_mfront_Ref_1342.out';
* FIC2   = 'CHAI' DIVERS '/mazars_biaxial_mfront_Ref_1242c.out';
* En attendant
  FIC1   = './mazars_biaxial_mfront_Ref_1342.out';
  FIC2   = './mazars_biaxial_mfront_Ref_1242c.out';
  OPTI ECHO 0 ;
  SAUT 1 LIGN ;
  MESS ' ===================  Comportement materiau : MFront  ====================';
  MESS ' Reference 3D_V  :' ' ' FIC1 ;
  MESS ' Reference 2D_CP :' ' ' FIC2 ;
  SAUT 1 LIGN ;
FINSI ;
OPTI ECHO 1 ;
str4 = CHAI str3 ' :' ;
tdess.'TITRE'. 1 = CHAI 'Cal_mat_' str3 ;


**************** C A S  #1  :  3 D   V O L U M I Q U E ****************
SI (EXIS lcas 1) ;

** Options generales
  OPTI 'DIME' 3 'MODE' 'TRID' 'ELEM' 'CUB8' ;
  o1 = xo1 yo1 zo1 ;

** Maillage
  p1      = 0. 0. 0. ;
  p2      = 0. long 0. ;
  l12     = DROI 1 p1 p2 ;
  sgauche = l12 TRAN 1 (0. 0. long) ;
  mail    = sgauche VOLU 'TRAN' 1 (long 0. 0.) ;
  sdroite = mail FACE 2 ;
  env1    = ENVE mail ;
  sbas    = env1 ELEM 4 ;
  shaut   = env1 ELEM 3 ;
  mes1    = MESU mail ;
  p33 = mail POIN 'PROC' (long long long) ;
cadr1 = COUL ((0. 1.05 1.05) ET (1. 1.05 1.05)) 'BLAN' ;
rep1 = @REPERE (-0.55 -0.55 0.) 'TURQ' ;
SI ITRAC1 ;
  TRAC o1 'QUAL' (cadr1 ET rep1 ET mail ET ((sgauche ET sbas) COUL 'VERT') ET ((sdroite ET shaut) COUL 'ROUG')) 'TITR' (CHAI str4 ' ' '[3D V] Maillage') ;
FINSI ;

** Modele et caracteristiques materiau (&BCALC : 1->Cast3M, 2->MFront)
SI (EGA &BCALC 1) ;
  mo = MODE mail 'MECANIQUE' 'ELASTIQUE' 'ENDOMMAGEMENT' 'MAZARS' ;
  ma = MATE mo 'YOUN' you 'NU' nu 'KTR0' epd0 'ACOM' ac 'BCOM' bc 'ATRA' at 'BTRA' bt 'BETA' beta ;
SINO ;
  coel = MOTS 'YOUN' 'NU' 'RHO' 'ALPH' 'TALP' 'TREF' 'ACOM' 'BCOM' 'ATRA' 'BTRA' 'BETA' 'EPSD';
  statev = MOTS 'DCOM' 'DTRA' 'ALFT' 'ALFC' 'D';
  mo = MODE mail 'MECANIQUE' 'ELASTIQUE' 'NON_LINEAIRE' 'UTILISATEUR' 'LIB_LOI' 'libUmatBehaviour.so' 'FCT_LOI' 'umatmazars' 'C_MATERIAU' coel 'C_VARINTER' statev;
  ma = MATE mo 'YOUN' you 'NU' nu 'RHO' xrho 'ALPH' xalph 'TALP' xtalp 'TREF' xtref 'ACOM' ac 'BCOM' bc 'ATRA' at 'BTRA' bt 'BETA' beta 'EPSD' epd0;
FINSI ;

** Blocages
  bl = (BLOQ 'UX' sgauche) ET (BLOQ 'UY' sbas) ET (BLOQ 'UZ' p1) ;

** Chargements (on fait varier le rapport entre les contraintes xx et yy imposees)
  langl  = PROG 45. 'PAS' 2.5 225. ;
  lsigxx = PROG ;
  lsigyy = PROG ;
  langl1 = PROG ;
  lok    = LECT ;
  REPE b0 (DIME langl) ;
*    angl1 = 120. ;
    angl1 = EXTR langl &b0 ;
    MESS '=== THETA' ' ' angl1 ' ===';
    sigmax0 = 5.E7 ;
    sigmax = sigmax0 / (MAXI (PROG (ABS (COS angl1)) (ABS (SIN angl1)))) ;
    MESS '    sigmax' ' ' sigmax ;
    sxximp = sigmax * (COS angl1) ;
    syyimp = sigmax * (SIN angl1) ;
    fprx   = PRES 'MASS' mo sdroite sxximp ;
    fpry   = PRES 'MASS' mo shaut   syyimp ;
    ev1    = EVOL 'MANU' (PROG 0. 1.) (PROG 0. 1.) ;
    cha    = CHAR 'MECA' (fprx ET fpry) ev1 ;

** Tracé des blocages et du chargement pour une valeur d'angle
    SI (EGA angl1 120.) ;
      re0 = @REPERE (-0.55 -0.55 0.) ;
      mor = MODE re0 'MECANIQUE' 'BARR' ;
      mar = MATE mor 'YOUN' 1. 'NU' 1. 'SECT' 1. ;
      rir = RIGI mor mar ;
      vfx = VECT fprx 'FORC' 'ROUG' (3.E-7 * 2.5E6 / 5.7735E7) ;
      vfy = VECT fpry 'FORC' 'ROUG' (3.E-7 * 2.5E6 / 5.7735E7) ;
      tit0 = CHAI str4 ' ' '[3D V] Blocages et chargement, angle' ' ' angl1 ' deg.';
      SI ITRAC1 ;
        TRAC o1 ((RIGI mo ma) ET bl ET rir) (vfx ET vfy) 'NOLE' 'TITR' tit0 ;
      FINSI ;
    FINSI ;

** Resolution
    t                               = TABL ;
    t . 'MODELE'                    = mo ;
    t . 'CARACTERISTIQUES'          = ma ;
    t . 'BLOCAGES_MECANIQUES'       = bl ;
    t . 'CHARGEMENT'                = cha ;
    t . 'TEMPS_CALCULES'            = PROG 0. 'PAS' 0.002 1. ;
    t . 'MOVA'                      = MOT 'D' ;
    t . 'MES_SAUVEGARDES'           = TABL ;
    t . 'MES_SAUVEGARDES' . 'DEFTO' = VRAI ;
    t . 'PROCEDURE_PERSO1'          = VRAI ;
    t . 'MAXSOUSPAS'                = 1000 ;
    PASAPAS t ;
    ok = 0 ;
    SI (EXIS t.'WTABLE' 'ARRET') ;
      SI (t.'WTABLE'.'ARRET') ;
        ok = 1 ;
      SINON;
        MESS '    la ruine n''a pas ete atteinte !';
      FINSI ;
    FINSI ;
    lok = lok ET ok ;

** Post traitement
*   Recuperation des contraintes SMXX et SMYY obtenues a l'avant dernier instant de calcul (dernier instant = dommage total)
    evsmxx = EVOL 'TEMP' t 'CONTRAINTES' 'SMXX' 1 1 1 ;
    evsmyy = EVOL 'TEMP' t 'CONTRAINTES' 'SMYY' 1 1 1 ;
    tu = t . 'DEPLACEMENTS' ;
    def0 = DEFO (cadr1 ET rep1 ET mail) (tu . 0) 0. ;
    tc = t . 'CONTRAINTES' ;
    nc = DIME tc ;
    lsigxx = lsigxx ET ((INTG mo (tc . (nc - 2)) 'SMXX') / mes1) ;
    lsigyy = lsigyy ET ((INTG mo (tc . (nc - 2)) 'SMYY') / mes1) ;
    langl1 = langl1 ET angl1 ;
    SI (EGA angl1 120.) ;
*     Courbes Dommage D en fonction des déplacements UX et UY
*     - D calcule au point de Gauss k de l'element j de la zone i
      vi_fi = t . 'VARIABLES_INTERNES' . ((DIME t . 'VARIABLES_INTERNES') - 1) ;
      pgauss = (EXCO vi_fi 'D') POIN 'COMPRIS' 0. 1. ;
      REPE b1_i (EXTR vi_fi 'NBZO') ;
        REPE b1_j (NBEL (EXTR vi_fi 'MAIL')) ;
          REPE b1_k (NBNO pgauss) ;
            evdii = EVOL 'ROUG' 'TEMP' t . 'VARIABLES_INTERNES' 'D   ' &b1_i &b1_j &b1_k ;
            yvdii = EXTR evdii 'ORDO' ;
            evuxi = EVOL 'ROUG' 'TEMP' t . 'DEPLACEMENTS' 'UX  ' p33 ;
            yvuxi = EXTR evuxi 'ORDO' ;
            evduxi = EVOL 'ROUG' 'MANU' 'DEPLACEMENTS' yvuxi 'VAR_INT D' yvdii ;
*            evduxi = EVOL 'ROUG' 'MANU' yvuxi yvdii ;
            evuyi = EVOL 'ROSE' 'TEMP' t . 'DEPLACEMENTS' 'UY  ' p33 ;
            yvuyi = EXTR evuyi 'ORDO' ;
            evduyi = EVOL 'ROSE' 'MANU' 'DEPLACEMENTS' yvuyi 'VAR_INT D' yvdii ;
*            evduyi = EVOL 'ROSE' 'MANU' yvuyi yvdii ;
            SI ((EGA &b1_i 1) ET (EGA &b1_j 1) ET (EGA &b1_k 1)) ;
              evdux1 = evduxi ;
              evduy1 = evduyi ;
            SINON ;
              evdux1 = evdux1 ET evduxi ;
              evduy1 = evduy1 ET evduyi ;
            FINSI ;
          FIN b1_k ;
        FIN b1_j ;
      FIN b1_i ;
*     - table des courbes et cummul dans une seule evolution
      t_evd1 = TABL ;
      t_evd1.'COUR'  = TABL ;
      t_evd1.'MARQ'  = TABL ;
      t_evd1.'TITRE' = TABL ;
      ix = 0 ; iy = 0 ;
      REPE b_evdux1 (DIME evdux1) ;
        ix = &b_evdux1 ;
        iy = (DIME evdux1) + &b_evdux1 ;
        t_evd1.'COUR'.  ix = EXTR evdux1 'COUR' ix ;
        t_evd1.'MARQ'.  ix = 'MARQ LOSA' ;
        t_evd1.'TITRE'. ix = CHAI 'Cal_mat_' str3 '_dir.X_pt.Gauss' ' ' ix ;
        t_evd1.'COUR'.  iy = EXTR evduy1 'COUR' ix ;
        t_evd1.'MARQ'.  iy = 'MARQ LOSA' ;
        t_evd1.'TITRE'. iy = CHAI 'Cal_mat_' str3 '_dir.Y_pt.Gauss' ' ' ix ;
        SI (EGA ix 1) ;
          evd1a = t_evd1.'COUR'. ix ;
        SINON ;
          evd1a = evd1a ET t_evd1.'COUR'. ix ;
        FINSI ;
      FIN b_evdux1 ;
      iy = ix ;
      REPE b_evduy1 (DIME evduy1) ;
        iy = iy + 1 ;
        evd1a = evd1a ET t_evd1.'COUR'. iy ;
      FIN b_evduy1 ;
*     - dessin des courbes de dommage
      tdess1 = TABL ;
      tdess1.'TITRE' = TABL ;
      REPE b_dess1 (2*(DIME evdux1)) ;
        tdess1. &b_dess1 = t_evd1.'MARQ'. &b_dess1 ;
        tdess1.'TITRE'. &b_dess1 = t_evd1.'TITRE'. &b_dess1 ;
      FIN b_dess1 ;
      tit1 = CHAI str4 ' ' '[3D V] Dommage D en fn de UX et UY, angle' ' ' angl1 ' deg.';
      SI ITRAC1 ;
        DESS evd1a 'TITR' tit1 'LEGE' 'SE' tdess1 ;
      FINSI ;

*     Courbes Contraintes en fonction des déformations : SMXX=fn(EPXX) et SMYY=fn(EPYYY)
*     - (SMXX,EPXX) et (SMYY,EPYY) calcules au point de Gauss k de l'element j de la zone i
      REPE b2_i (EXTR vi_fi 'NBZO') ;
        REPE b2_j (NBEL (EXTR vi_fi 'MAIL')) ;
          REPE b2_k (NBNO pgauss) ;
            evsxi = EVOL 'TEMP' t . 'CONTRAINTES'  'SMXX' &b2_i &b2_j &b2_k ;
            evexi = EVOL 'TEMP' t . 'DEFORMATIONS' 'EPXX' &b2_i &b2_j &b2_k ;
            titri = CHAI 'SMXX=f(EPXX) zone' ' ' &b2_i ', elem.' &b2_j ', pt.Gauss' ' ' &b2_k ;
            evxxi = EVOL 'ROUG' 'MANU' 'LEGE' titri 'DEFORMATIONS' (EXTR evexi 'ORDO')
                                                     'CONTRAINTES' (EXTR evsxi 'ORDO') ;
            evsyi = EVOL 'TEMP' t . 'CONTRAINTES'  'SMYY' &b2_i &b2_j &b2_k ;
            eveyi = EVOL 'TEMP' t . 'DEFORMATIONS' 'EPYY' &b2_i &b2_j &b2_k ;
            titri = CHAI 'SMYY=f(EPYY) zone' ' ' &b2_i ', elem.' &b2_j ', pt.Gauss' ' ' &b2_k ;
            evyyi = EVOL 'ROSE' 'MANU' 'LEGE' titri 'DEFORMATIONS' (EXTR eveyi 'ORDO')
                                                     'CONTRAINTES' (EXTR evsyi 'ORDO') ;
            SI ((EGA &b2_i 1) ET (EGA &b2_j 1) ET (EGA &b2_k 1)) ;
              evxx1 = evxxi ;
              evyy1 = evyyi ;
            SINON ;
              evxx1 = evxx1 ET evxxi ;
              evyy1 = evyy1 ET evyyi ;
            FINSI ;
          FIN b2_k ;
        FIN b2_j ;
      FIN b2_i ;
*     - table des courbes et cummul dans une seule evolution
      t_evse1 = TABL ;
      t_evse1.'COUR'  = TABL ;
      t_evse1.'MARQ'  = TABL ;
      t_evse1.'TITRE' = TABL ;
      REPE b_evse1 ((DIME evxx1) + (DIME evyy1)) ;
        SI (<EG &b_evse1 8) ;
          t_evse1.'COUR'.  &b_evse1 = EXTR evxx1 'COUR' &b_evse1 ;
          t_evse1.'MARQ'.  &b_evse1 = 'MARQ LOSA' ;
          t_evse1.'TITRE'. &b_evse1 = CHAI 'Cal_mat_' str3 '_dir.X_pt.Gauss' ' ' &b_evse1 ;
        SINON ;
          t_evse1.'COUR'.  &b_evse1 = EXTR evyy1 'COUR' (&b_evse1 - 8) ;
          t_evse1.'MARQ'.  &b_evse1 = 'MARQ CARR' ;
          t_evse1.'TITRE'. &b_evse1 = CHAI 'Cal_mat_' str3 '_dir.Y_pt.Gauss' ' ' (&b_evse1 - 8) ;
        FINS;
        SI (EGA &b_evse1 1) ;
          evse1a = t_evse1.'COUR'. &b_evse1 ;
        SINON ;
          evse1a = evse1a ET t_evse1.'COUR'. &b_evse1 ;
        FINSI ;
      FIN b_evse1 ;
*     - dessin des courbes SMXX=fn(EPXX) et SMYY=fn(EPYY)
      tdess2 = TABL ;
      tdess2.'TITRE' = TABL ;
      REPE b_dess2 (DIME evse1a) ;
        tdess2. &b_dess2 = t_evse1.'MARQ'. &b_dess2 ;
        tdess2.'TITRE'. &b_dess2 = t_evse1.'TITRE'. &b_dess2 ;
      FIN b_dess2 ;
      tit2 = CHAI str4 ' ' '[3D V] SMXX=fn(EPXX) et SMYY=fn(EPYY), angle' ' ' angl1 ' deg.';
      SI ITRAC1 ;
        DESS evse1a 'TITR' tit2 'LEGE' 'SE' tdess2 ;
      FINSI ;

*     contraintes SMXX et SMYY et deformations EPXX et EPYY a l'avant dernier instant (on retient l'etat avant dommage total)
      nn = ((DIME t . 'VARIABLES_INTERNES') - 2) ;
      tt = t . 'TEMPS'. nn ;
      titrj = CHAI ' pas' ' ' nn ' instant' ' ' tt ;
      sm_ad = t . 'CONTRAINTES'. nn ;
      ep_ad = t . 'DEFORMATIONS'. nn ;
      val_smxx_ad = MAXI (EXCO sm_ad 'SMXX') ;
      val_epxx_ad = MAXI (EXCO ep_ad 'EPXX') ;
      val_smyy_ad = MAXI (EXCO sm_ad 'SMYY') ;
      val_epyy_ad = MAXI (EXCO ep_ad 'EPYY') ;
      SAUT 1 'LIGN' ;
      MESS '|THETA[deg]' ' ' angl1 ' |SMXX[Pa]' ' ' val_smxx_ad ' |EPXX[adim]' ' ' val_epxx_ad
                                   ' |SMYY[Pa]' ' ' val_smyy_ad ' |EPYY[adim]' ' ' val_epyy_ad ;
*     deformee
      REPE b2 (DIME t . 'TEMPS') ;
        tps1 = t . 'TEMPS' . (&b2 - 1) ;
*       trace de la deformee (pour controle visuel)
        def1 = DEFO mail (tu . (&b2 - 1)) 516. 'ROUG' ;
        tit1 = CHAI str4 ' ' '[3D V] Deformee au temps' ' ' tps1 ;
        SI ITRAC1 ;
*          TRAC o1 (def0 ET def1) 'TITR' tit1 ;
          SI (&b2 EGA ((DIME t . 'TEMPS') - 1)) ;
            TRAC o1 (def0 ET def1) 'TITR' tit1 ;
          FINSI ;
        FINSI ;
      FIN b2 ;
      SI ITRAC1 ;
*        TRAC o1 (def0 ET def1) 'TITR' tit1 ;
      FINSI ;
    FINSI ;
*   Courbes calculees Contrainte avant ruine vs Angle
    evsmxx1 = EVOL 'TURQ' 'MANU' 'Angle' langl1 'SMXX' lsigxx ;
    evsmyy1 = EVOL 'OCEA' 'MANU' 'Angle' langl1 'SMYY' lsigyy ;
  FIN b0 ;
* test que pour toutes les valeurs d'angle, on a atteint la ruine
  SI (EXIS lok 0) ;
    MESS ;
    MESS '***** Attention, pour certains points la ruine n''a pas ete atteinte ! *****' ;
    MESS ;
    LIST lok ;
  FINSI ;

* Solution de Reference
* FIC1 : mazars_biaxial_Ref_1342.out issu de 08_biaxial_non_suivi/08_biaxial_Ref_1342.dgibi
* - pas de temps = 1.E-3 s
* - increm. angle = 1 deg.
  ev2 evsmxx2 evsmyy2 = SOL_REF FIC1 ;

* Courbes SMXX vs SMYY
* on complete la courbe calculée sur [45 deg. ; 125deg] par sa symetrie par rapport à la bissectrice
  nval = DIME lsigxx ;
  lsigxx1 = lsigxx ;
  lsigyy1 = lsigyy ;
  REPE b_val (nval - 1) ;
    lsigxx1 = lsigxx1 ET (PROG (EXTR lsigyy (nval - &b_val))) ;
    lsigyy1 = lsigyy1 ET (PROG (EXTR lsigxx (nval - &b_val))) ;
  FIN b_val ;
  ev1 = EVOL 'ROUG' 'MANU' 'SMXX' lsigxx1 'SMYY' lsigyy1 ;
  tit1 = CHAI str4 ' ' '[3D V] Diagramme des contraintes SMXX - SMYY' ;
  SI ITRAC1 ;
    DESS (ev1 ET ev2) 'CARR' 'AXES' 'GRIL' 'POIN' 'GRIS' 'TITR' tit1 'LEGE' tdess ;
  FINSI ;

* Courbes normalisées à la resistance en compression uniaxiale Fc : SMXX/|Fc| - SMYY/|Fc|
* - REX cas-test 2D-CP de compression uniaxiale en contrainte imposée 08_biaxial_Ref_1222c.dgibi : Fc = -25,64 MPa
  Fc = -0.2564E8 ;
*  - normalisation
  ev1sFc = EVOL 'ROUG' 'MANU' 'SMXX/|Fc|' (lsigxx1 / (ABS Fc)) 'SMYY/|Fc|' (lsigyy1 / (ABS Fc)) ;
  ev2sFc = EVOL 'ROSE' 'MANU' 'SMXX/|Fc|' ((EXTR ev2 'ABSC') / (ABS Fc)) 'SMYY/|Fc|' ((EXTR ev2 'ORDO') / (ABS Fc)) ;
  tit1 = CHAI str4 ' ' '[3D V] Diagramme des contraintes normalisees SMXX/|Fc| - SMYY/|Fc|' ;
  SI ITRAC1 ;
    DESS (ev1sFc ET ev2sFc) 'CARR' 'AXES' 'GRIL' 'POIN' 'GRIS' 'TITR' tit1 'LEGE' tdess ;
  FINSI ;

* Comparaison Calcul / Reference sur les courbes SMXX vs Angle et SMYY vs Angle
* - sol. calculee : evsmxx1 et evsmyy1
* - sol. de Référence (calculée) : evsmxx2 et evsmyy2
*mess 'Courbe Reference';list evsmxx2;
*mess 'Courbe calculee';list evsmxx1;
  merx = EC_REL 'SMXX' evsmxx2 evsmxx1 'Angle' '[3D V]' ITRAC1 tdess ;
  mery = EC_REL 'SMYY' evsmyy2 evsmyy1 'Angle' '[3D V]' ITRAC1 tdess ;

** Sauvegarde des resultats de calcul Cast3M (reference pour MFront) au format .csv
  SI ISAUV ;
    str2 = '3D_V_' ;
    fic3 = CHAI str1 str2 str3 '.csv' ;
    OPTI SORT fic3 ;
    SORT 'EXCE' (evsmxx1 ET evsmyy1) 'DIGI' 16 ;
  FINSI ;

  OPTI ECHO 0 ;
  SAUT 1 LIGN ;
  MESS ' **************** C A S  #1  :  3 D   V O L U M I Q U E ****************';
  SAUT 1 LIGN ;
  SI ((MAXI merx mery) < 2.E-2) ;
    MESS ' Moy.int. Val.abs. Ecart relatif entre Calcul et Reference' ;
    MESS ' - Contrainte SMXX' ' ' merx ;
    MESS ' - Contrainte SMYY' ' ' mery ;
    MESS ' - maximum des 2 composantes' ' ' (MAXI merx mery) ' < 2.E-02 => OK' ;
    SAUT 1 LIGN ;
  SINO ;
    MESS ' Moy.int. Val.abs. Ecart relatif entre Calcul et Reference' ;
    MESS ' - Contrainte SMXX' ' ' merx ;
    MESS ' - Contrainte SMYY' ' ' mery ;
    MESS ' - maximum des 2 composantes' ' ' (MAXI merx mery) ' > 2.E-02 => ECHEC' ;
    IERR = VRAI ;
    SAUT 1 LIGN ;
  FINS ;
  SAUT 1 LIGN ;
  OPTI ECHO 1 ;
FINSI ;


******* C A S  #2  :  2 D   C O N T R A I N T E S   P L A N E S ********
SI (EXIS lcas 2) ;

** Options generales
  OPTI 'DIME' 2 'MODE' 'PLAN' 'CONT' 'ELEM' 'QUA4' ;

** Maillage
  p1      = 0. 0. ;
  p2      = 0. long ;
  sgauche = DROI 1 p1 p2 ;
  mail    = sgauche TRAN 1 (long 0.) ;
  shaut   = mail COTE 2 ;
  sdroite = mail COTE 3 ;
  sbas    = mail COTE 4 ;
  mes1    = MESU mail ;
  p33 = mail POIN 'PROC' (long long) ;
cadr1 = COUL ((1.11 0.) ET (1.11 1.)) 'BLAN' ;
rep1 = @REPERE (-0.2 -0.2) (PROG 0.5 0.5) 'TURQ' ;
SI ITRAC1 ;
  TRAC 'QUAL' (cadr1 ET rep1 ET mail ET ((sgauche ET sbas) COUL 'VERT') ET ((sdroite ET shaut) COUL 'ROUG')) 'TITR' (CHAI str4 ' ' '[2D Plan cont.] Maillage') ;
FINSI ;

** Modele et caracteristiques materiau (&BCALC : 1->Cast3M, 2->MFront)
SI (EGA &BCALC 1) ;
  mo = MODE mail 'MECANIQUE' 'ELASTIQUE' 'ENDOMMAGEMENT' 'MAZARS' ;
  ma = MATE mo 'YOUN' you 'NU' nu 'KTR0' epd0 'ACOM' ac 'BCOM' bc 'ATRA' at 'BTRA' bt 'BETA' beta 'DIM3' epai ;
SINO ;
  coel = MOTS 'YOUN' 'NU' 'RHO' 'ALPH' 'DIM3' 'TALP' 'TREF' 'ACOM' 'BCOM' 'ATRA' 'BTRA' 'BETA' 'EPSD';
  statev = MOTS 'DCOM' 'DTRA' 'ALFT' 'ALFC' 'D' 'ETOZ';
  mo = MODE mail 'MECANIQUE' 'ELASTIQUE' 'NON_LINEAIRE' 'UTILISATEUR' 'LIB_LOI' 'libUmatBehaviour.so' 'FCT_LOI' 'umatmazars' 'C_MATERIAU' coel 'C_VARINTER' statev;
  ma = MATE mo 'YOUN' you 'NU' nu 'RHO' xrho 'ALPH' xalph 'DIM3' epai 'TALP' xtalp 'TREF' xtref 'ACOM' ac 'BCOM' bc 'ATRA' at 'BTRA' bt 'BETA' beta 'EPSD' epd0;
FINSI ;

** Blocages
  bl = (BLOQ 'UX' sgauche) ET (BLOQ 'UY' sbas) ;

** Chargements (on fait varier le rapport entre les contraintes xx et yy imposees)
  langl  = PROG 45. 'PAS' 2.5 225. ;
  lsigxx = PROG ;
  lsigyy = PROG ;
  langl1 = PROG ;
  lok    = LECT ;
  REPE b0 (DIME langl) ;
*    angl1 = 120. ;
    angl1 = EXTR langl &b0 ;
    MESS '=== THETA' ' ' angl1 ' ===';
    sigmax0 = 5.E6 ;
    sigmax = sigmax0 / (MAXI (PROG (ABS (COS angl1)) (ABS (SIN angl1)))) ;
    MESS '    sigmax' ' ' sigmax ;
    sxximp = sigmax * (COS angl1) ;
    syyimp = sigmax * (SIN angl1) ;
    fprx   = PRES 'MASS' mo sdroite sxximp ;
    fpry   = PRES 'MASS' mo shaut   syyimp ;
    ev1    = EVOL 'MANU' (PROG 0. 1.) (PROG 0. 1.) ;
    cha    = CHAR 'MECA' (fprx ET fpry) ev1 ;

** Tracé des blocages et du chargement pour une valeur d'angle
    SI (EGA angl1 120.) ;
      re0 = @REPERE (-0.2 -0.2) (PROG 0.5 0.5) ;
      mor = MODE re0 'MECANIQUE' 'BARR' ;
      mar = MATE mor 'YOUN' 1. 'NU' 1. 'SECT' 1. ;
      rir = RIGI mor mar ;
      vfx = VECT fprx 'FORC' 'ROUG' (1.E-6 * 0.25E6 / 5.7735E6) ;
      vfy = VECT fpry 'FORC' 'ROUG' (1.E-6 * 0.25E6 / 5.7735E6) ;
      tit0 = CHAI str4 ' ' '[2D Plan cont.] Blocages et chargement, angle' ' ' angl1 ' deg.';
      SI ITRAC1 ;
        TRAC ((RIGI mo ma) ET bl ET rir) (vfx ET vfy) 'NOLE' 'TITR' tit0 ;
      FINSI ;
    FINSI ;

** Resolution
    t                               = TABL ;
    t . 'MODELE'                    = mo ;
    t . 'CARACTERISTIQUES'          = ma ;
    t . 'BLOCAGES_MECANIQUES'       = bl ;
    t . 'CHARGEMENT'                = cha ;
    t . 'TEMPS_CALCULES'            = PROG 0. 'PAS' 0.002 1. ;
    t . 'MOVA'                      = MOT 'D' ;
    t . 'MES_SAUVEGARDES'           = TABL ;
    t . 'MES_SAUVEGARDES' . 'DEFTO' = VRAI ;
    t . 'PROCEDURE_PERSO1'          = VRAI ;
    t . 'MAXSOUSPAS'                = 1000 ;
    PASAPAS t ;
    ok = 0 ;
    SI (EXIS t.'WTABLE' 'ARRET') ;
      SI (t.'WTABLE'.'ARRET') ;
        ok = 1 ;
      SINON;
        MESS '    la ruine n''a pas ete atteinte !';
      FINSI ;
    FINSI ;
    lok = lok ET ok ;

** Post traitement
*   Recuperation des contraintes SMXX et SMYY obtenues a l'avant dernier instant de calcul (dernier instant = dommage total)
    evsmxx = EVOL 'TEMP' t 'CONTRAINTES' 'SMXX' 1 1 1 ;
    evsmyy = EVOL 'TEMP' t 'CONTRAINTES' 'SMYY' 1 1 1 ;
    tu = t . 'DEPLACEMENTS' ;
    def0 = DEFO (cadr1 ET rep1 ET mail) (tu . 0) 0. ;
    tc = t . 'CONTRAINTES' ;
    nc = DIME tc ;
    lsigxx = lsigxx ET ((INTG mo (tc . (nc - 2)) 'SMXX') / mes1) ;
    lsigyy = lsigyy ET ((INTG mo (tc . (nc - 2)) 'SMYY') / mes1) ;
    langl1 = langl1 ET angl1 ;
    SI (EGA angl1 120.) ;
*     Courbes Dommage D en fonction des déplacements UX et UY
*     - D calcule au point de Gauss k de l'element j de la zone i
      vi_fi = t . 'VARIABLES_INTERNES' . ((DIME t . 'VARIABLES_INTERNES') - 1) ;
      pgauss = (EXCO vi_fi 'D') POIN 'COMPRIS' 0. 1. ;
      REPE b1_i (EXTR vi_fi 'NBZO') ;
        REPE b1_j (NBEL (EXTR vi_fi 'MAIL')) ;
          REPE b1_k (NBNO pgauss) ;
            evdii = EVOL 'ROUG' 'TEMP' t . 'VARIABLES_INTERNES' 'D   ' &b1_i &b1_j &b1_k ;
            yvdii = EXTR evdii 'ORDO' ;
            evuxi = EVOL 'ROUG' 'TEMP' t . 'DEPLACEMENTS' 'UX  ' p33 ;
            yvuxi = EXTR evuxi 'ORDO' ;
            evduxi = EVOL 'ROUG' 'MANU' 'DEPLACEMENTS' yvuxi 'VAR_INT D' yvdii ;
*            evduxi = EVOL 'ROUG' 'MANU' yvuxi yvdii ;
            evuyi = EVOL 'ROSE' 'TEMP' t . 'DEPLACEMENTS' 'UY  ' p33 ;
            yvuyi = EXTR evuyi 'ORDO' ;
            evduyi = EVOL 'ROSE' 'MANU' 'DEPLACEMENTS' yvuyi 'VAR_INT D' yvdii ;
*            evduyi = EVOL 'ROSE' 'MANU' yvuyi yvdii ;
            SI ((EGA &b1_i 1) ET (EGA &b1_j 1) ET (EGA &b1_k 1)) ;
              evdux1 = evduxi ;
              evduy1 = evduyi ;
            SINON ;
              evdux1 = evdux1 ET evduxi ;
              evduy1 = evduy1 ET evduyi ;
            FINSI ;
          FIN b1_k ;
        FIN b1_j ;
      FIN b1_i ;
*     - table des courbes et cummul dans une seule evolution
      t_evd1 = TABL ;
      t_evd1.'COUR'  = TABL ;
      t_evd1.'MARQ'  = TABL ;
      t_evd1.'TITRE' = TABL ;
      ix = 0 ; iy = 0 ;
      REPE b_evdux1 (DIME evdux1) ;
        ix = &b_evdux1 ;
        iy = (DIME evdux1) + &b_evdux1 ;
        t_evd1.'COUR'.  ix = EXTR evdux1 'COUR' ix ;
        t_evd1.'MARQ'.  ix = MOT 'MARQ LOSA' ;
        t_evd1.'TITRE'. ix = CHAI 'Cal_mat_' str3 '_dir.X_pt.Gauss' ' ' ix ;
        t_evd1.'COUR'.  iy = EXTR evduy1 'COUR' ix ;
        t_evd1.'MARQ'.  iy = MOT 'MARQ LOSA' ;
        t_evd1.'TITRE'. iy = CHAI 'Cal_mat_' str3 '_dir.Y_pt.Gauss' ' ' ix ;
        SI (EGA ix 1) ;
          evd1a = t_evd1.'COUR'. ix ;
        SINON ;
          evd1a = evd1a ET t_evd1.'COUR'. ix ;
        FINSI ;
      FIN b_evdux1 ;
      iy = ix ;
      REPE b_evduy1 (DIME evduy1) ;
        iy = iy + 1 ;
        evd1a = evd1a ET t_evd1.'COUR'. iy ;
      FIN b_evduy1 ;
*     - dessin des courbes de dommage
      tdess1 = TABL ;
      tdess1.'TITRE' = TABL ;
      REPE b_dess1 (2*(DIME evdux1)) ;
        tdess1. &b_dess1 = t_evd1.'MARQ'. &b_dess1 ;
        tdess1.'TITRE'. &b_dess1 = t_evd1.'TITRE'. &b_dess1 ;
      FIN b_dess1 ;
      tit1 = CHAI str4 ' ' '[2D Plan cont.] Dommage D en fn de UX et UY, angle' ' ' angl1 ' deg.';
      SI ITRAC1 ;
        DESS evd1a 'TITR' tit1 'LEGE' 'SE' tdess1 ;
      FINSI ;

*     Courbes Contraintes en fonction des déformations : SMXX=fn(EPXX) et SMYY=fn(EPYYY)
*     - (SMXX,EPXX) et (SMYY,EPYY) calcules au point de Gauss k de l'element j de la zone i
      REPE b2_i (EXTR vi_fi 'NBZO') ;
        REPE b2_j (NBEL (EXTR vi_fi 'MAIL')) ;
          REPE b2_k (NBNO pgauss) ;
            evsxi = EVOL 'TEMP' t . 'CONTRAINTES'  'SMXX' &b2_i &b2_j &b2_k ;
            evexi = EVOL 'TEMP' t . 'DEFORMATIONS' 'EPXX' &b2_i &b2_j &b2_k ;
            titri = CHAI 'SMXX=f(EPXX) zone' ' ' &b2_i ', elem.' &b2_j ', pt.Gauss' ' ' &b2_k ;
            evxxi = EVOL 'ROUG' 'MANU' 'LEGE' titri 'DEFORMATIONS' (EXTR evexi 'ORDO')
                                                     'CONTRAINTES' (EXTR evsxi 'ORDO') ;
            evsyi = EVOL 'TEMP' t . 'CONTRAINTES'  'SMYY' &b2_i &b2_j &b2_k ;
            eveyi = EVOL 'TEMP' t . 'DEFORMATIONS' 'EPYY' &b2_i &b2_j &b2_k ;
            titri = CHAI 'SMYY=f(EPYY) zone' ' ' &b2_i ', elem.' &b2_j ', pt.Gauss' ' ' &b2_k ;
            evyyi = EVOL 'ROSE' 'MANU' 'LEGE' titri 'DEFORMATIONS' (EXTR eveyi 'ORDO')
                                                     'CONTRAINTES' (EXTR evsyi 'ORDO') ;
            SI ((EGA &b2_i 1) ET (EGA &b2_j 1) ET (EGA &b2_k 1)) ;
              evxx1 = evxxi ;
              evyy1 = evyyi ;
            SINON ;
              evxx1 = evxx1 ET evxxi ;
              evyy1 = evyy1 ET evyyi ;
            FINSI ;
          FIN b2_k ;
        FIN b2_j ;
      FIN b2_i ;
*     - table des courbes et cummul dans une seule evolution
      t_evse1 = TABL ;
      t_evse1.'COUR'  = TABL ;
      t_evse1.'MARQ'  = TABL ;
      t_evse1.'TITRE' = TABL ;
      REPE b_evse1 ((DIME evxx1) + (DIME evyy1)) ;
        SI (<EG &b_evse1 4) ;
          t_evse1.'COUR'.  &b_evse1 = EXTR evxx1 'COUR' &b_evse1 ;
          t_evse1.'MARQ'.  &b_evse1 = MOT 'MARQ LOSA' ;
          t_evse1.'TITRE'. &b_evse1 = CHAI 'Cal_mat_' str3 '_dir.X_pt.Gauss' ' ' &b_evse1 ;
        SINON ;
          t_evse1.'COUR'.  &b_evse1 = EXTR evyy1 'COUR' (&b_evse1 - 4) ;
          t_evse1.'MARQ'.  &b_evse1 = MOT 'MARQ CARR' ;
          t_evse1.'TITRE'. &b_evse1 = CHAI 'Cal_mat_' str3 '_dir.Y_pt.Gauss' ' ' (&b_evse1 - 4) ;
        FINS;
        SI (EGA &b_evse1 1) ;
          evse1a = t_evse1.'COUR'. &b_evse1 ;
        SINON ;
          evse1a = evse1a ET t_evse1.'COUR'. &b_evse1 ;
        FINSI ;
      FIN b_evse1 ;
*     - dessin des courbes SMXX=fn(EPXX) et SMYY=fn(EPYY)
      tdess2 = TABL ;
      tdess2.'TITRE' = TABL ;
      REPE b_dess2 (DIME evse1a) ;
        tdess2. &b_dess2 = t_evse1.'MARQ'. &b_dess2 ;
        tdess2.'TITRE'. &b_dess2 = t_evse1.'TITRE'. &b_dess2 ;
      FIN b_dess2 ;
      tit2 = CHAI str4 ' ' '[2D Plan cont.] SMXX=fn(EPXX) et SMYY=fn(EPYY), angle' ' ' angl1 ' deg.';
      SI ITRAC1 ;
        DESS evse1a 'TITR' tit2 'LEGE' 'SE' tdess2 ;
      FINSI ;

*     contraintes SMXX et SMYY et deformations EPXX et EPYY a l'avant dernier instant (on retient l'etat avant dommage total)
      nn = ((DIME t . 'VARIABLES_INTERNES') - 2) ;
      tt = t . 'TEMPS'. nn ;
      titrj = CHAI ' pas' ' ' nn ' instant' ' ' tt ;
      sm_ad = t . 'CONTRAINTES'. nn ;
      ep_ad = t . 'DEFORMATIONS'. nn ;
      val_smxx_ad = MAXI (EXCO sm_ad 'SMXX') ;
      val_epxx_ad = MAXI (EXCO ep_ad 'EPXX') ;
      val_smyy_ad = MAXI (EXCO sm_ad 'SMYY') ;
      val_epyy_ad = MAXI (EXCO ep_ad 'EPYY') ;
      SAUT 1 'LIGN' ;
      MESS '|THETA[deg]' ' ' angl1 ' |SMXX[Pa]' ' ' val_smxx_ad ' |EPXX[adim]' ' ' val_epxx_ad
                                   ' |SMYY[Pa]' ' ' val_smyy_ad ' |EPYY[adim]' ' ' val_epyy_ad ;
*     deformee
      REPE b2 (DIME t . 'TEMPS') ;
        tps1 = t . 'TEMPS' . (&b2 - 1) ;
*       trace de la deformee (pour controle visuel)
        def1 = DEFO mail (tu . (&b2 - 1)) 516. 'ROUG' ;
        tit1 = CHAI str4 ' ' '[2D Plan cont.] Deformee au temps' ' ' tps1 ;
        SI ITRAC1 ;
*          TRAC (def0 ET def1) 'TITR' tit1 ;
          SI (&b2 EGA ((DIME t . 'TEMPS') - 1)) ;
            TRAC (def0 ET def1) 'TITR' tit1 ;
          FINSI ;
        FINSI ;
      FIN b2 ;
      SI ITRAC1 ;
*        TRAC (def0 ET def1) 'TITR' tit1 ;
      FINSI ;
    FINSI ;
*   Courbes calculees Contrainte avant ruine vs Angle
    evsmxx1 = EVOL 'TURQ' 'MANU' 'Angle' langl1 'SMXX' lsigxx ;
    evsmyy1 = EVOL 'OCEA' 'MANU' 'Angle' langl1 'SMYY' lsigyy ;
  FIN b0 ;
* test que pour toutes les valeurs d'angle, on a atteint la ruine
  SI (EXIS lok 0) ;
    MESS ;
    MESS '***** Attention, pour certains points la ruine n''a pas ete atteinte ! *****' ;
    MESS ;
    LIST lok ;
  FINSI ;

* Solution de Reference
* FIC2 : mazars_biaxial_Ref_1242c.out issu de 08_biaxial_non_suivi/08_biaxial_Ref_1242c.dgibi
* - pas de temps = 1.E-3 s
* - increm. angle = 1 deg.
  ev2 evsmxx2 evsmyy2 = SOL_REF FIC2 ;

* Courbes SMXX vs SMYY
* on complete la courbe calculée sur [45 deg. ; 125deg] par sa symetrie par rapport à la bissectrice
  nval = DIME lsigxx ;
  lsigxx1 = lsigxx ;
  lsigyy1 = lsigyy ;
  REPE b_val (nval - 1) ;
    lsigxx1 = lsigxx1 ET (PROG (EXTR lsigyy (nval - &b_val))) ;
    lsigyy1 = lsigyy1 ET (PROG (EXTR lsigxx (nval - &b_val))) ;
  FIN b_val ;
  ev1 = EVOL 'ROUG' 'MANU' 'SMXX' lsigxx1 'SMYY' lsigyy1 ;
  tit1 = CHAI str4 ' ' '[2D Plan cont.] Diagramme des contraintes SMXX - SMYY' ;
  SI ITRAC1 ;
    DESS (ev1 ET ev2) 'CARR' 'AXES' 'GRIL' 'POIN' 'GRIS' 'TITR' tit1 'LEGE' tdess ;
  FINSI ;

* Courbes normalisées à la resistance en compression uniaxiale Fc : SMXX/|Fc| - SMYY/|Fc|
* - REX cas-test 2D-CP de compression uniaxiale en contrainte imposée 08_biaxial_Ref_1222c.dgibi : Fc = -25,64 MPa
  Fc = -0.2564E8 ;
*  - normalisation
  ev1sFc = EVOL 'ROUG' 'MANU' 'SMXX/|Fc|' (lsigxx1 / (ABS Fc)) 'SMYY/|Fc|' (lsigyy1 / (ABS Fc)) ;
  ev2sFc = EVOL 'ROSE' 'MANU' 'SMXX/|Fc|' ((EXTR ev2 'ABSC') / (ABS Fc)) 'SMYY/|Fc|' ((EXTR ev2 'ORDO') / (ABS Fc)) ;
  tit1 = CHAI str4 ' ' '[2D Plan cont.] Diagramme des contraintes normalisees SMXX/|Fc| - SMYY/|Fc|' ;
  SI ITRAC1 ;
    DESS (ev1sFc ET ev2sFc) 'CARR' 'AXES' 'GRIL' 'POIN' 'GRIS' 'TITR' tit1 'LEGE' tdess ;
  FINSI ;

* Comparaison Calcul / Reference sur les courbes SMXX vs Angle et SMYY vs Angle
* - sol. calculee : evsmxx1 et evsmyy1
* - sol. de Référence (calculée) : evsmxx2 et evsmyy2
*mess 'Courbe Reference';list evsmxx2;
*mess 'Courbe calculee';list evsmxx1;
  merx = EC_REL 'SMXX' evsmxx2 evsmxx1 'Angle' '[2D Plan cont.]' ITRAC1 tdess ;
  mery = EC_REL 'SMYY' evsmyy2 evsmyy1 'Angle' '[2D Plan cont.]' ITRAC1 tdess ;

** Sauvegarde des resultats de calcul Cast3M (reference pour MFront) au format .csv
  SI ISAUV ;
    str2 = '2D_CP_' ;
    fic3 = CHAI str1 str2 str3 '.csv' ;
    OPTI SORT fic3 ;
    SORT 'EXCE' (evsmxx1 ET evsmyy1) 'DIGI' 16 ;
  FINSI ;

  OPTI ECHO 0 ;
  SAUT 1 LIGN ;
  MESS ' ******* C A S  #2  :  2 D   C O N T R A I N T E S   P L A N E S *******';
  SAUT 1 LIGN ;
  SI ((MAXI merx mery) < 2.E-2) ;
    MESS ' Moy.int. Val.abs. Ecart relatif entre Calcul et Reference' ;
    MESS ' - Contrainte SMXX' ' ' merx ;
    MESS ' - Contrainte SMYY' ' ' mery ;
    MESS ' - maximum des 2 composantes' ' ' (MAXI merx mery) ' < 2.E-02 => OK' ;
    SAUT 1 LIGN ;
  SINO ;
    MESS ' Moy.int. Val.abs. Ecart relatif entre Calcul et Reference' ;
    MESS ' - Contrainte SMXX' ' ' merx ;
    MESS ' - Contrainte SMYY' ' ' mery ;
    MESS ' - maximum des 2 composantes' ' ' (MAXI merx mery) ' > 2.E-02 => ECHEC' ;
    IERR = VRAI ;
    SAUT 1 LIGN ;
  FINS ;
  SAUT 1 LIGN ;
  OPTI ECHO 1 ;
FINSI ;

** Sortie sur Erreur 1152 en cas de non conformite
SI IERR ;
  ERRE 1152 ;
  ERRE 5 ;
FINSI ;


FIN BCALC ;


FIN ;
