* fichier : mazars_traction_compression.dgibi
************************************************************************
*      Cas test elementaire pour la loi d'endommagement de Mazars      *
*                 Essai de traction-compression alterné                *
*                                                                      *
* Le test est realise avec plusieurs modes de calcul :                 *
*   1) 3D volumique                                                    *
*   2) 3D poutre a fibre                                               *
*   3) 2D contraintes planes                                           *
*   4) 2D axisymetrique                                                *
*   5) 2D poutre a fibre                                               *
*                                                                      *
* Selon deux modes d'integration du comportement                       *
* realises successivement dans la boucle BCALC :                       *
*   passage 1 : Cast3M                                                 *
*   passage 2 : MFront (pas actif a date)                              *
*                                                                      *
* ITRAC1 : VRAI => affichage resultats                                 *
* IPSC1  : VRAI => affichage resultats dans un PostScript Couleur      *
************************************************************************

** Options
** - pour les traces
ITRAC1 = VRAI ;
IPSC1  = VRAI ;
SI IPSC1 ;
  OPTI 'TRAC' 'PSC' ;
FINSI ;
** - pour la sauvegarde des résultats de calcul Cast3M et/ou MFront
ISAUV = FAUX ;
SI ISAUV ;
  str1 = 'mazars_traction_compression_' ;
FINSI ;

** Initialisation sortie sur Erreur 1152 "Solution calculee non conforme par rapport a la solution de reference"
IERR = FAUX ;

** Liste des modes de calcul a traiter
lcas = LECT 1 2 3 4 5 ;
*lcas = LECT 1 ; COMM '3D volumique' ;
*lcas = LECT 2 ; COMM '3D poutre a fibre' ;
*lcas = LECT 3 ; COMM '2D contraintes planes' ;
*lcas = LECT 4 ; COMM '2D axisymetrique' ;
*lcas = LECT 5 ; COMM '2D poutre a fibre' ;

** Parametres geometriques
long = 1. ;
epai = 0.1 ;

** Parametres materiau
you   = 20.E9 ;
nu    = 0.2 ;
epd0  = 8.E-5 ;
at    = 1. ;
ac    = 1.5 ;
bt    = 8000. ;
bc    = 1550. ;
beta  = 1. ;
xrho  = 0. ;
xalph = 0. ;
xtalp = 0. ;
xtref = 0. ;

** Parametres chargement traction (utmax), compression (ucmax), instant d'alternance (inst_a)
utmax  =  2.E-4 ;
ucmax  = -5.E-3 ;
inst_a = utmax / (utmax + (0.5*(ABS ucmax))) ;

OPTI ECHO 0 ;
SAUT 1 lign ;
mess 'Parametres' ;
mess '==========';
SAUT 1 lign ;
mess 'Parametre de taille de l element' ;
mess '- H = arete du cube : long (m)' ' ' long ;
SAUT 1 lign ;
mess 'Coef. elastiques' ;
mess '- Module d Young         : you (Pa)' you ;
mess '- Coefficient de Poisson : nu' ' ' ' ' ' ' ' ' ' ' ' ' nu ;
SAUT 1 lign ;
mess 'Coef. Mazars' ;
mess '- KTR0 : epd0' ' ' epd0 ;
mess '- ATRA : at' ' ' ' ' ' ' at ;
mess '- BTRA : bt' ' ' ' ' ' ' bt ;
mess '- ACOM : ac' ' ' ' ' ' ' ac ;
mess '- BCOM : bc' ' ' ' ' ' ' bc ;
mess '- BETA : beta' ' ' beta ;
SAUT 1 lign ;
mess 'Chargement' ;
mess '- Traction Depl.imp.max    : utmax' ' ' utmax ;
mess '- Compression Depl.imp.max : ucmax' ' ' ucmax ;
mess '- Instant d alternance     : inst_a' ' ' inst_a ;
SAUT 1 lign ;
OPTI ECHO 1 ;
*opti donn 5;

** Legende courbes
  tdess = 'TABLE' ;
  tdess.'TITRE' = 'TABLE' ;
  tdess. 1 = MOT 'MARQ LOSA' ;
  tdess. 2 = MOT 'MARQ CROI REGU' ;
  tdess.'TITRE'. 2 = MOT 'Ref_Traction' ;
  tdess. 3 = MOT 'MARQ PLUS REGU' ;
  tdess.'TITRE'. 3 = MOT 'Ref_Compression' ;

** Oeil en 3D_V (trace a conserver pour conserver l'oeil)
  OPTI 'DIME' 3 'MODE' 'TRID' 'ELEM' 'CUB8' ;
  rep1 = @REPERE (-0.55 -0.55 0.) 'TURQ' ;
  TRAC rep1 'TITR' 'Repere 3D';
  o1 = VALE OEIL ;
  xo1 yo1 zo1 = COOR o1 ;


REPE BCALC 2 ;
*============= A ENLEVER pour realiser le calcul MFront =============
SI (NEG &BCALC 1) ;
  QUIT BCALC;
FINSI ;
*========================== fin A ENLEVER ===========================
** Distinction des résultats de calcul Cast3M ou MFront (PostScript, sauvegarde)
SI (EGA &BCALC 1) ;
  str3 = 'Cast3M' ;
  OPTI ECHO 0 ;
  SAUT 1 LIGN ;
  MESS ' ===================  Comportement materiau : Cast3M  ====================';
  SAUT 1 LIGN ;
SINO ;
  str3 = 'MFront' ;
  OPTI ECHO 0 ;
  SAUT 1 LIGN ;
  MESS ' ===================  Comportement materiau : MFront  ====================';
  SAUT 1 LIGN ;
FINSI ;
OPTI ECHO 1 ;
str4 = CHAI str3 ' :' ;
tdess.'TITRE'. 1 = CHAI 'Cal_mat_' str3 ;


**************** C A S  #1  :  3 D   V O L U M I Q U E ****************
SI (EXIS lcas 1) ;

** Options generales
  OPTI 'DIME' 3 'MODE' 'TRID' 'ELEM' 'CUB8' ;
  o1 = xo1 yo1 zo1 ;

** Maillage
  p1      = 0. 0. 0. ;
  p2      = 0. long 0. ;
  l12     = DROI 1 p1 p2 ;
  sgauche = l12 TRAN 1 (0. 0. long) ;
  mail    = sgauche VOLU 'TRAN' 1 (long 0. 0.) ;
  sdroite = mail FACE 2 ;
  p3      = sdroite POIN 'PROC' (long 0. 0.) ;
  mes1    = MESU mail ;
cadr1 = COUL ((0. 1.05 1.05) ET (1. 1.05 1.05)) 'BLAN' ;
rep1 = @REPERE (-0.55 -0.55 0.) 'TURQ' ;
SI ITRAC1 ;
  TRAC o1 'QUAL' (cadr1 ET rep1 ET mail ET (sgauche COUL 'VERT') ET (sdroite COUL 'ROUG')) 'TITR' (CHAI str4 ' ' '[3D V] Maillage') ;
FINSI ;

** Modele et caracteristiques materiau (&BCALC : 1->Cast3M, 2->MFront)
SI (EGA &BCALC 1) ;
  mo = MODE mail 'MECANIQUE' 'ELASTIQUE' 'ENDOMMAGEMENT' 'MAZARS' ;
  ma = MATE mo 'YOUN' you 'NU' nu 'KTR0' epd0 'ACOM' ac 'BCOM' bc 'ATRA' at 'BTRA' bt 'BETA' beta ;
SINO ;
  coel = MOTS 'YOUN' 'NU' 'RHO' 'ALPH' 'TALP' 'TREF' 'ACOM' 'BCOM' 'ATRA' 'BTRA' 'BETA' 'EPSD';
  statev = MOTS 'DCOM' 'DTRA' 'ALFT' 'ALFC' 'D';
  mo = MODE mail 'MECANIQUE' 'ELASTIQUE' 'NON_LINEAIRE' 'UTILISATEUR' 'LIB_LOI' 'libUmatBehaviour.so' 'FCT_LOI' 'umatmazars' 'C_MATERIAU' coel 'C_VARINTER' statev;
  ma = MATE mo 'YOUN' you 'NU' nu 'RHO' xrho 'ALPH' xalph 'TALP' xtalp 'TREF' xtref 'ACOM' ac 'BCOM' bc 'ATRA' at 'BTRA' bt 'BETA' beta 'EPSD' epd0;
FINSI ;

** Blocages
  blgauche = BLOQ 'UX' sgauche ;
  bldroite = BLOQ 'UX' sdroite ;
  blrig    = (BLOQ 'UY' 'UZ' p1) ET (BLOQ 'UZ' p2) ;
  bl       = blgauche ET bldroite ET blrig ;

** Chargements
  didroite = DEPI bldroite 1. ;
  ec1      = EVOL 'MANU' (PROG 0.  (0.5*inst_a)  inst_a  1.   )
                         (PROG 0.  utmax         0.      ucmax) ;
  cha      = CHAR 'DIMP' didroite ec1 ;

** Tracé des blocages et du chargement
  re0 = @REPERE (-0.55 -0.55 0.) ;
  mor = MODE re0 'MECANIQUE' 'BARR' ;
  mar = MATE mor 'YOUN' 1. 'NU' 1. 'SECT' 1. ;
  rir = RIGI mor mar ;
  vf  = VECT didroite 'FLX' ' ' ' ' 'ROUGE' ;
  SI ITRAC1 ;
    TRAC o1 ((RIGI mo ma) ET blgauche ET blrig ET rir) vf 'NOLE' 'TITR' (CHAI str4 ' ' '[3D V] Blocages et chargement') ;
  FINSI ;

** Resolution
  t                               = TABL ;
  t . 'MODELE'                    = mo ;
  t . 'CARACTERISTIQUES'          = ma ;
  t . 'BLOCAGES_MECANIQUES'       = bl ;
  t . 'CHARGEMENT'                = cha ;
  t . 'TEMPS_CALCULES'            = PROG 0. 'PAS' 3.E-3 (0.5*inst_a)
                                            'PAS' 3.E-3 inst_a
                                            'PAS' 1.E-2 1. ;
  t . 'MOVA'                      = MOT 'D' ;
  t . 'MES_SAUVEGARDES'           = TABL ;
  t . 'MES_SAUVEGARDES' . 'DEFTO' = VRAI ;
  PASAPAS t ;

** Post traitement
* courbes : endommagement moyen vs temps
*           contrainte moyenne vs deformation moyenne
*           force de reaction vs deplacement impose
  tt = t . 'TEMPS' ;
  tc = t . 'CONTRAINTES' ;
  te = t . 'DEFORMATIONS' ;
  tv = t . 'VARIABLES_INTERNES' ;
  tu = t . 'DEPLACEMENTS' ;
  tr = t . 'REACTIONS' ;
  def0 = DEFO (cadr1 ET rep1 ET mail) (tu . 0) 0. ;
  ltps   = PROG ;
  ltps_t = PROG ;
  ltps_c = PROG ;
  lend = PROG ;
  lsig = PROG ;
  leps = PROG ;
  ldep = PROG ;
  lrea = PROG ;
  end_p = 0. ;
  REPE b0 (DIME tt) ;
    tps1 = tt . (&b0 - 1) ;
*   Liste des instants : globale (ltps) de traction (ltps_t) de compression (ltps_c)
    ltps = ltps ET tps1 ;
    SI (<EG tps1 inst_a) ;
      ltps_t = ltps_t ET tps1 ;
    SINON ;
      ltps_c = ltps_c ET tps1 ;
    FINSI ;
    end1 = (INTG mo (tv . (&b0 - 1)) 'D')    / mes1 ;
    sig1 = (INTG mo (tc . (&b0 - 1)) 'SMXX') / mes1 ;
    eps1 = (INTG mo (te . (&b0 - 1)) 'EPXX') / mes1 ;
    u1   = EXTR (tu . (&b0 - 1)) 'UX' p3 ;
    rea1 = 0. ;
    SI (NEG &b0 1) ;
      rea1 = @TOTAL (tr . (&b0 - 1)) sgauche 'FX' ;
    FINSI ;
    lend = lend ET end1 ;
    lsig = lsig ET sig1 ;
    leps = leps ET eps1 ;
    ldep = ldep ET u1 ;
    lrea = lrea ET rea1 ;
*   Endommagement de transition traction-compression end_t
    dd1 = end1 - end_p ;
    SI ((> end1 0.) ET (EGA dd1 0.)) ;
      end_t = end1 ;
    SINON ;
    FINSI ;
    end_p = end1 ;
  FIN b0 ;
  ev0 = EVOL 'ROUG' 'MANU' 'Temps' ltps 'D'    lend ;
  ev1 = EVOL 'ROUG' 'MANU' 'EPXX'  leps 'SMXX' lsig ;
  ev2 = EVOL 'ROUG' 'MANU' 'UX'    ldep 'FX'   lrea ;
** Sol.Ana.Traction
  ltps_t =  ENLE (ENLE ltps_t (DIME ltps_t)) 1 ;
  nb1 = DIME ltps_t ;
  un1 = PROG nb1 * 1.D0 ;
  lepd01 = PROG nb1 * epd0 ;
  lat1 = PROG nb1 * at ;
* defo.unidim.
  lepu1 = (IPOL ltps_t ec1) / long ;
* defo.eq.Mazars (eps.tild) traction = defo.unidim.
  lepe1 = lepu1 ;
  dt = un1 - ((epd0*(un1-lat1)/lepe1) + (at*(EXP(bt*(lepd01-lepe1))))) ;
  lfiltr1 = LECT ;
  REPE b1 ;
    dt_i = EXTR dt &b1 ;
    SI (EGA &b1 1) ;
      dt_p = 0. ;
    FINSI ;
    ddt = dt_i - dt_p ;
    SI ((ddt < 0.) OU (dt_i < 0.) OU (dt_i > 1.)) ;
      lfiltr1 = lfiltr1 ET (LECT &b1) ;
    FINSI ;
    dt_p = dt_i ;
    SI (EGA &b1 (DIME dt)) ;
      QUIT b1 ;
    FINSI ;
  FIN b1 ;
  ltps_t = ENLE ltps_t lfiltr1 ;
  un1    = ENLE un1    lfiltr1 ;
  lepu1  = ENLE lepu1  lfiltr1 ;
  dt     = ENLE dt     lfiltr1 ;
  lsig1 = (un1 - dt) * you * lepu1 ;
  an01 = EVOL 'TURQ' 'MANU' 'Temps' ltps_t 'D'    dt    ;
  tpst_t = IPOL end_t dt ltps_t ;
  an11 = EVOL 'TURQ' 'MANU' 'EPXX'  lepu1  'SMXX' lsig1 ;
  sigt_t = IPOL tpst_t ltps_t lsig1 ;
  epst_t = IPOL tpst_t ltps_t lepu1 ;

** Sol.Ana.Compression
  nb2 = DIME ltps_c ;
  un2 = PROG nb2 * 1.D0 ;
  lepd02 = PROG nb2 * epd0 ;
  lac2 = PROG nb2 * ac ;
* defo.unidim.
  lepu2 = (IPOL ltps_c ec1) / long ;
* defo.eq.Mazars (eps.tild) compression = racine(2)*nu*|defo.unidim.|
  lepe2 = (2.**0.5) * nu * (ABS lepu2) ;
  dc = un2 - ((epd0*(un2-lac2)/lepe2) + (ac*(EXP(bc*(lepd02-lepe2))))) ;
  lfiltr2 = LECT ;
  REPE b2 ;
    dc_i = EXTR dc &b2 ;
    SI (EGA &b2 1) ;
      dc_p = 1. ;
    FINSI ;
    ddc = dc_i - dc_p ;
    SI ((ddc < 0.) OU (dc_i < 0.) OU (dc_i > 1.)) ;
      lfiltr2 = lfiltr2 ET (LECT &b2) ;
    FINSI ;
    dc_p = dc_i ;
    SI (EGA &b2 (DIME dc)) ;
      QUIT b2 ;
    FINSI ;
  FIN b2 ;
  ltps_c = ENLE ltps_c lfiltr2 ;
  un2    = ENLE un2    lfiltr2 ;
  lepu2  = ENLE lepu2  lfiltr2 ;
  dc     = ENLE dc     lfiltr2 ;
  lsig2 = (un2 - dc) * you * lepu2 ;
  an02 = EVOL 'TURQ' 'MANU' 'Temps' ltps_c 'D'    dc    ;
  tpsc_t = IPOL end_t dc ltps_c ;
  an12 = EVOL 'TURQ' 'MANU' 'EPXX'  lepu2  'SMXX' lsig2 ;
  sigc_t = IPOL tpsc_t ltps_c lsig2 ;
  epsc_t = IPOL tpsc_t ltps_c lepu2 ;
  SI ITRAC1 ;
    DESS (ev0 ET an01 ET an02) 'TITR' (CHAI str4 ' ' '[3D V] Endommagement vs Temps') 'LEGE' 'SE' tdess ;
    DESS (ev1 ET an11 ET an12) 'TITR' (CHAI str4 ' ' '[3D V] Contrainte vs Deformation') 'LEGE' 'NO' tdess ;
    DESS ev2 'TITR' (CHAI str4 ' ' '[3D V] Reaction vs Deplacement') 'LEGE' 'SE' tdess ;
  FINSI ;
* evolutions temporelles a tous les points de Gauss
  ng = 8 ;
  tleg = TABL ;
  tleg . 1 = MOT 'MARQ CARR NOLI' ;
  tleg . 2 = MOT 'MARQ LOSA NOLI' ;
  tleg . 3 = MOT 'MARQ ROND NOLI' ;
  tleg . 4 = MOT 'MARQ ETOI NOLI' ;
  tleg . 5 = MOT 'MARQ TRID NOLI' ;
  tleg . 6 = MOT 'MARQ TRIU NOLI' ;
  tleg . 7 = MOT 'MARQ TRIL NOLI' ;
  tleg . 8 = MOT 'MARQ TRIR NOLI' ;
  tleg . 'TITRE' = TABL ;
  REPE b ng ;
    tleg . 'TITRE' . &b = CHAI 'Cal_mat_' str3 '_Pt_Gauss' ' ' &b ;
  FIN b ;
* endommagement
  evend = VIDE 'EVOLUTIO' ;
  REPE b ng ;
    evend = evend ET (EVOL 'ROSE' 'TEMP' t 'VARIABLES_INTERNES' 'D' 1 1 &b) ;
  FIN b ;
  tleg . (ng+1) = MOT 'MARQ CROI REGU' ;
  tleg . 'TITRE' . (ng+1) = MOT 'Ref_Traction' ;
  tleg . (ng+2) = MOT 'MARQ PLUS REGU' ;
  tleg . 'TITRE' . (ng+2) = MOT 'Ref_Compression' ;
  SI ITRAC1 ;
    DESS (evend ET an01 ET an02) 'LEGE' 'SE' tleg 'TITR' (CHAI str4 ' ' '[3D V] D vs Temps') ;
  FINSI ;
* contrainte
  evsmxx = VIDE 'EVOLUTIO' ;
  REPE b ng ;
    evsmxx = evsmxx ET (EVOL 'BLEU' 'TEMP' t 'CONTRAINTES' 'SMXX' 1 1 &b) ;
  FIN b ;
  ansmxx1 = EVOL 'TURQ' 'MANU' 'Temps' ltps_t 'SMXX' lsig1 ;
  ansmxx2 = EVOL 'TURQ' 'MANU' 'Temps' ltps_c 'SMXX' lsig2 ;
  SI ITRAC1 ;
    DESS (evsmxx ET ansmxx1 ET ansmxx2) 'LEGE' 'NE' tleg 'TITR' (CHAI str4 ' ' '[3D V] SMXX vs Temps') ;
  FINSI ;
* deformation
  evepxx = VIDE 'EVOLUTIO' ;
  REPE b ng ;
    evepxx = evepxx ET (EVOL 'VERT' 'TEMP' t 'DEFORMATIONS' 'EPXX' 1 1 &b) ;
  FIN b ;
  SI ITRAC1 ;
    DESS evepxx 'LEGE' 'NE' tleg 'TITR' (CHAI str4 ' ' '[3D V] EPXX vs Temps') ;
  FINSI ;
* deformee
  REPE b3 (DIME tt) ;
    tps1 = tt . (&b3 - 1) ;
*   trace de la deformee (pour controle visuel)
    def1 = DEFO mail (tu . (&b3 - 1)) 33. 'ROUG' ;
    tit1 = CHAI str4 ' ' '[3D V] Deformee au temps' ' ' tps1 ;
    SI ITRAC1 ;
*      TRAC o1 (def0 ET def1) 'TITR' tit1 ;
    FINSI ;
  FIN b3 ;
  SI ITRAC1 ;
    TRAC o1 (def0 ET def1) 'TITR' tit1 ;
  FINSI ;
* comparaison Calcul / Reference sur la contrainte moyenne
*  Traction, courbes réduites
  lepu1_red = PROG ;
  lsig1_red = PROG ;
  born_inf = EXTR lepu1 1 ;
  born_sup = epst_t ;
  REPE b_an11 (dime lepu1) ;
    xi = EXTR lepu1 &b_an11 ;
    yi = EXTR lsig1 &b_an11 ;
    SI ((>EG xi born_inf) ET (<EG xi born_sup)) ;
      lepu1_red = lepu1_red et (PROG xi) ;
      lsig1_red = lsig1_red et (PROG yi) ;
    FINSI ;
  FIN b_an11 ;
  an11_red = EVOL 'TURQ' 'MANU' 'EPXX'  lepu1_red  'SMXX' lsig1_red ;

  leps_red = PROG ;
  lsig_red = PROG ;
  ltps_red = PROG ;
  xp = 0. ;
  REPE b_ev1 (dime leps) ;
    xi = EXTR leps &b_ev1 ;
    dx = xi - xp ;
    yi = EXTR lsig &b_ev1 ;
    ti = EXTR ltps &b_ev1 ;
    SI ((>EG xi born_inf) ET (<EG xi born_sup) ET (>EG dx 0)) ;
      leps_red = leps_red et (PROG xi) ;
      lsig_red = lsig_red et (PROG yi) ;
      ltps_red = ltps_red et (PROG ti) ;
    FINSI ;
    xp = xi ;
  FIN b_ev1 ;
  ev1_red = EVOL 'ROUG' 'MANU' 'EPXX'  leps_red 'SMXX' lsig_red ;

  lsiga_red = 'IPOL' an11_red leps_red ;
  ler1 = ABS (lsig_red - lsiga_red) / lsiga_red ;
  eer1 = EVOL 'ORAN' 'MANU' 'Temps'  ltps_red  'Ec.rel.SMXX' ler1 ;
  dtps = (EXTR ltps_red (DIME ltps_red)) - (EXTR ltps_red 1) ;
  mer1 = (INTG eer1) / dtps ;
  tit1 = CHAI str4 ' ' '[3D V] Ecart rel. |Calc.-Ref.|/Ref. en trac., Moy.int.|Ecart|' ' ' mer1 ;
  SI ITRAC1 ;
    DESS eer1 'TITR' tit1 ;
  FINSI ;

*  Compression, courbes réduites
  lepu2_red = PROG ;
  lsig2_red = PROG ;
  born_inf = epsc_t ;
  born_sup = EXTR lepu2 (DIME lepu2) ;
  REPE b_an12 (dime lepu2) ;
    xi = EXTR lepu2 &b_an12 ;
    yi = EXTR lsig2 &b_an12 ;
    SI ((<EG xi born_inf) ET (>EG xi born_sup)) ;
      lepu2_red = lepu2_red et (PROG xi) ;
      lsig2_red = lsig2_red et (PROG yi) ;
    FINSI ;
  FIN b_an12 ;
  an12_red = EVOL 'TURQ' 'MANU' 'EPXX'  lepu2_red  'SMXX' lsig2_red ;

  leps_red = PROG ;
  lsig_red = PROG ;
  ltps_red = PROG ;
  xp = 0. ;
  REPE b_ev1 (dime leps) ;
    xi = EXTR leps &b_ev1 ;
    dx = xi - xp ;
    yi = EXTR lsig &b_ev1 ;
    ti = EXTR ltps &b_ev1 ;
    SI ((<EG xi born_inf) ET (>EG xi born_sup)) ;
      leps_red = leps_red et (PROG xi) ;
      lsig_red = lsig_red et (PROG yi) ;
      ltps_red = ltps_red et (PROG ti) ;
    FINSI ;
    xp = xi ;
  FIN b_ev1 ;
  ev1_red = EVOL 'ROUG' 'MANU' 'EPXX'  leps_red 'SMXX' lsig_red ;

  lsiga_red = 'IPOL' an12_red leps_red ;
  ler2 = ABS ((lsig_red - lsiga_red) / lsiga_red) ;
  eer2 = EVOL 'ORAN' 'MANU' 'Temps'  ltps_red  '|Ec.rel|SMXX' ler2 ;
  dtps = (EXTR ltps_red (DIME ltps_red)) - (EXTR ltps_red 1) ;
  mer2 = (INTG eer2) / dtps ;
  tit2 = CHAI str4 ' ' '[3D V] Val.abs.Ec.rel.|(Calc-Ref)/Ref| en compr., Moy.int.|Ecart|' ' ' mer2 ;
  SI ITRAC1 ;
    DESS eer2 'TITR' tit2 ;
  FINSI ;
  tdes1 = 'TABLE' ;
  tdes1.'TITRE' = 'TABLE' ;
  tdes1 . 1 = MOT 'MARQ CROI' ;
  tdes1 . 'TITRE' . 1 = MOT 'Traction' ;
  tdes1 . 2 = MOT 'MARQ PLUS' ;
  tdes1 . 'TITRE' . 2 = MOT 'Compression' ;
  tit1 = CHAI str4 ' ' '[3D V] |Ec.r|, Moy.int.|Ec.r| en trac.' mer1 ' - compr.' mer2 ;
  SI ITRAC1 ;
    DESS (eer1 et eer2) 'LEGE' 'NO' tdes1 'TITR' tit1 ;
  FINSI ;

** Sauvegarde des resultats de calcul Cast3M (reference pour MFront) au format .csv
  SI ISAUV ;
    str2 = '3D_V_' ;
    fic1 = CHAI str1 str2 str3 '.csv' ;
    OPTI SORT fic1 ;
    SORT 'EXCE' ev1 'DIGI' 16 ;
  FINSI ;

  OPTI ECHO 0 ;
  SAUT 1 LIGN ;
  MESS ' **************** C A S  #1  :  3 D   V O L U M I Q U E ****************';
  SAUT 1 LIGN ;
  SI ((MAXI mer1 mer2) < 1.E-6) ;
    MESS ' Moy.int. Val.abs. Ecart relatif entre Calcul et Reference' ;
    MESS ' - phase 1.Traction' ' ' mer1 ;
    MESS ' - phase 2.Compression' ' ' mer2 ;
    MESS ' - maximum des 2 phases' ' ' (MAXI mer1 mer2) ' < 1.E-06 => OK' ;
    SAUT 1 LIGN ;
  SINO ;
    MESS ' Moy.int. Val.abs. Ecart relatif entre Calcul et Reference' ;
    MESS ' - phase 1.Traction' ' ' mer1 ;
    MESS ' - phase 2.Compression' ' ' mer2 ;
    MESS ' - maximum des 2 phases' ' ' (MAXI mer1 mer2) ' > 1.E-06 => ECHEC' ;
    IERR = VRAI ;
    SAUT 1 LIGN ;
  FINS ;
  SAUT 1 LIGN ;
  OPTI ECHO 1 ;
FINSI ;


*********** C A S  #2  :  3 D   P O U T R E   A   F I B R E ************
SI ((EXIS lcas 2) ET (EGA &BCALC 1)) ;

** Options generales
  OPTI 'DIME' 3 'MODE' 'TRID' 'ELEM' 'CUB8' ;
  o1 = xo1 yo1 zo1 ;

** Maillage
  p1s     = (-0.5 * epai) (-0.5 * epai) 0. ;
  p2s     = (-0.5 * epai) ( 0.5 * epai) 0. ;
  l12s    = DROI 1 p1s p2s ;
  mails   = l12s TRAN 1 (epai 0. 0.) ;
  p1      = 0. 0. 0. ;
  p2      = long 0. 0. ;
  mail    = DROI 1 p1 p2 ;
  mes1    = MESU mails ;
cadr1 = COUL ((-0.1 0. 0.) ET (1. 0. 0.)) 'BLAN' ;
rep1 = @REPERE (-0.2 -0.2 0.) (PROG 0.2 0.2 0.2) 'TURQ' ;
SI ITRAC1 ;
  TRAC o1 'QUAL' (cadr1 ET rep1 ET (mails COUL 'VERT') ET (mail COUL 'ROUG')) 'TITR' (CHAI str4 ' ' '[3D PaF] Maillages de la Poutre et de sa Section') ;
FINSI ;

** Modele et caracteristiques materiau (&BCALC : 1->Cast3M, 2->MFront)
SI (EGA &BCALC 1) ;
  mos = MODE mails 'MECANIQUE' 'ELASTIQUE' 'PLASTIQUE' 'MAZARS' 'QUAS' ;
  mas = MATE mos 'YOUN' you 'NU' nu 'KTR0' epd0 'ACOM' ac 'BCOM' bc 'ATRA' at 'BTRA' bt 'BETA' beta
                 'ALPY' 1. 'ALPZ' 1. ;
  mo = MODE mail 'MECANIQUE' 'ELASTIQUE' 'SECTION' 'PLASTIQUE' 'SECTION' 'TIMO' ;
  ma = MATE mo 'MODS' mos 'MATS' mas 'VECT' (0. 1. 0.) ;
SINO ;
* Implémentation MFront A FAIRE. En attendant on quitte la boucle...
  QUIT BCALC;
FINSI ;

** Blocages
  blgauche = BLOQ 'DEPL' 'ROTA' p1 ;
  bldroite = BLOQ 'UX' p2 ;
  bl       = blgauche ET bldroite ;
  bldroit2 = BLOQ 'ROTA' p2 ;
  bl       = bl ET bldroit2 ;

** Chargements
  didroite = DEPI bldroite 1. ;
  ec1      = EVOL 'MANU' (PROG 0.  (0.5*inst_a)  inst_a  1.   )
                         (PROG 0.  utmax         0.      ucmax) ;
  cha      = CHAR 'DIMP' didroite ec1 ;

** Tracé des blocages et du chargement
  re0 = @REPERE (-0.2 -0.2 0.) (PROG 0.2 0.2 0.2) ;
  mor = MODE re0 'MECANIQUE' 'BARR' ;
  mar = MATE mor 'YOUN' 1. 'NU' 1. 'SECT' 1. ;
  rir = RIGI mor mar ;
  vf  = VECT didroite 'FLX' ' ' ' ' 'ROUG' 0.1 ;
  SI ITRAC1 ;
    TRAC o1 ((RIGI mo ma) ET blgauche ET rir) vf 'NOLE' 'TITR' (CHAI str4 ' ' '[3D PaF] Blocages et chargement') ;
  FINSI ;

** Resolution
  t                               = TABL ;
  t . 'MODELE'                    = mo ;
  t . 'CARACTERISTIQUES'          = ma ;
  t . 'BLOCAGES_MECANIQUES'       = bl ;
  t . 'CHARGEMENT'                = cha ;
  t . 'TEMPS_CALCULES'            = PROG 0. 'PAS' 3.E-3 (0.5*inst_a)
                                            'PAS' 3.E-3 inst_a
                                            'PAS' 1.E-2 1. ;
  t . 'MES_SAUVEGARDES'           = TABL ;
  t . 'MES_SAUVEGARDES' . 'DEFTO' = VRAI ;
  PASAPAS t ;

** Post traitement
* courbes : endommagement moyen vs temps
*           contrainte moyenne vs deformation moyenne
*           force de reaction vs deplacement impose
* evolutions temporelles a tous les points de Gauss
  ng = 4 ;
  tleg = TABL ;
  tleg . 1 = MOT 'MARQ CARR NOLI' ;
  tleg . 2 = MOT 'MARQ LOSA NOLI' ;
  tleg . 3 = MOT 'MARQ ROND NOLI' ;
  tleg . 4 = MOT 'MARQ ETOI NOLI' ;
  tleg . 'TITRE' = TABL ;
  REPE b ng ;
    tleg . 'TITRE' . &b = CHAI 'Cal_mat_' str3 '_Pt_Gauss' ' ' &b ;
  FIN b ;
  tleg . (ng+1) = MOT 'MARQ CROI REGU' ;
  tleg . 'TITRE' . (ng+1) = MOT 'Ref_Traction' ;
  tleg . (ng+2) = MOT 'MARQ PLUS REGU' ;
  tleg . 'TITRE' . (ng+2) = MOT 'Ref_Compression' ;
  tt = t . 'TEMPS' ;
  tv = t . 'VARIABLES_INTERNES' ;
  tu = t . 'DEPLACEMENTS' ;
  tr = t . 'REACTIONS' ;
  def0 = DEFO (cadr1 ET rep1 ET mail) (tu . 0) 0. ;
  ltps   = PROG ;
  ltps_t = PROG ;
  ltps_c = PROG ;
  lend1 = PROG ;
  lend2 = PROG ;
  lend3 = PROG ;
  lend4 = PROG ;
  lsig1 = PROG ;
  lsig2 = PROG ;
  lsig3 = PROG ;
  lsig4 = PROG ;
  leps1 = PROG ;
  leps2 = PROG ;
  leps3 = PROG ;
  leps4 = PROG ;
  ldep = PROG ;
  lrea = PROG ;
  end_p = 0. ;
  REPE b0 (DIME tt) ;
    tps1 = tt . (&b0 - 1) ;
*   Liste des instants : globale (ltps) de traction (ltps_t) de compression (ltps_c)
    ltps = ltps ET tps1 ;
    SI (<EG tps1 inst_a) ;
      ltps_t = ltps_t ET tps1 ;
    SINON ;
      ltps_c = ltps_c ET tps1 ;
    FINSI ;
    SI (EGA &b0 1) ;
      lend1 = lend1 ET 0. ;
      lend2 = lend2 ET 0. ;
      lend3 = lend3 ET 0. ;
      lend4 = lend4 ET 0. ;
      lsig1 = lsig1 ET 0. ;
      lsig2 = lsig2 ET 0. ;
      lsig3 = lsig3 ET 0. ;
      lsig4 = lsig4 ET 0. ;
      leps1 = leps1 ET 0. ;
      leps2 = leps2 ET 0. ;
      leps3 = leps3 ET 0. ;
      leps4 = leps4 ET 0. ;
      end1 = 0. ;
    SINON ;
      lend1 = lend1 ET (EXTR (EXTR (tv . (&b0 - 1)) 'VAIS' 1 1 1) 'VHNI' 1 1 1) ;
      lend2 = lend2 ET (EXTR (EXTR (tv . (&b0 - 1)) 'VAIS' 1 1 1) 'VHNI' 1 1 2) ;
      lend3 = lend3 ET (EXTR (EXTR (tv . (&b0 - 1)) 'VAIS' 1 1 1) 'VHNI' 1 1 3) ;
      lend4 = lend4 ET (EXTR (EXTR (tv . (&b0 - 1)) 'VAIS' 1 1 1) 'VHNI' 1 1 4) ;
      lsig1 = lsig1 ET (EXTR (EXTR (tv . (&b0 - 1)) 'VONS' 1 1 1) 'SMXX' 1 1 1) ;
      lsig2 = lsig2 ET (EXTR (EXTR (tv . (&b0 - 1)) 'VONS' 1 1 1) 'SMXX' 1 1 2) ;
      lsig3 = lsig3 ET (EXTR (EXTR (tv . (&b0 - 1)) 'VONS' 1 1 1) 'SMXX' 1 1 3) ;
      lsig4 = lsig4 ET (EXTR (EXTR (tv . (&b0 - 1)) 'VONS' 1 1 1) 'SMXX' 1 1 4) ;
      leps1 = leps1 ET (EXTR (EXTR (tv . (&b0 - 1)) 'VAIS' 1 1 1) 'VISX' 1 1 1) ;
      leps2 = leps2 ET (EXTR (EXTR (tv . (&b0 - 1)) 'VAIS' 1 1 1) 'VISX' 1 1 2) ;
      leps3 = leps3 ET (EXTR (EXTR (tv . (&b0 - 1)) 'VAIS' 1 1 1) 'VISX' 1 1 3) ;
      leps4 = leps4 ET (EXTR (EXTR (tv . (&b0 - 1)) 'VAIS' 1 1 1) 'VISX' 1 1 4) ;
      end1 = EXTR (EXTR (tv . (&b0 - 1)) 'VAIS' 1 1 1) 'VHNI' 1 1 1 ;
    FINSI ;
    u1   = EXTR (tu . (&b0 - 1)) 'UX' p2 ;
    rea1 = EXTR (tr . (&b0 - 1)) 'FX' p1 ;
    ldep = ldep ET u1 ;
    lrea = lrea ET rea1 ;
*   Endommagement de transition traction-compression end_t
    dd1 = end1 - end_p ;
    SI ((> end1 0.) ET (EGA dd1 0.)) ;
      end_t = end1 ;
    SINON ;
    FINSI ;
    end_p = end1 ;
  FIN b0 ;
  ev0 = (EVOL 'ROUG' 'MANU' 'Temps' ltps 'D' lend1) ET (EVOL 'ROUG' 'MANU' 'Temps' ltps 'D' lend2) ET
        (EVOL 'ROUG' 'MANU' 'Temps' ltps 'D' lend3) ET (EVOL 'ROUG' 'MANU' 'Temps' ltps 'D' lend4) ;
  ev1 = (EVOL 'ROUG' 'MANU' 'EPXX'  leps1 'SMXX' lsig1) ET (EVOL 'ROUG' 'MANU' 'EPXX' leps2 'SMXX' lsig2) ET
        (EVOL 'ROUG' 'MANU' 'EPXX'  leps3 'SMXX' lsig3) ET (EVOL 'ROUG' 'MANU' 'EPXX' leps4 'SMXX' lsig4) ;
  ev2 = EVOL 'ROUG' 'MANU' 'UX' ldep 'FX' lrea ;
** Sol.Ana.Traction
  ltps_t =  ENLE (ENLE ltps_t (DIME ltps_t)) 1 ;
  nb1 = DIME ltps_t ;
  un1 = PROG nb1 * 1.D0 ;
  lepd01 = PROG nb1 * epd0 ;
  lat1 = PROG nb1 * at ;
* defo.unidim.
  lepu1 = (IPOL ltps_t ec1) / long ;
* defo.eq.Mazars (eps.tild) traction = defo.unidim.
  lepe1 = lepu1 ;
  dt = un1 - ((epd0*(un1-lat1)/lepe1) + (at*(EXP(bt*(lepd01-lepe1))))) ;
  lfiltr1 = LECT ;
  REPE b1 ;
    dt_i = EXTR dt &b1 ;
    SI (EGA &b1 1) ;
      dt_p = 0. ;
    FINSI ;
    ddt = dt_i - dt_p ;
    SI ((ddt < 0.) OU (dt_i < 0.) OU (dt_i > 1.)) ;
      lfiltr1 = lfiltr1 ET (LECT &b1) ;
    FINSI ;
    dt_p = dt_i ;
    SI (EGA &b1 (DIME dt)) ;
      QUIT b1 ;
    FINSI ;
  FIN b1 ;
  ltps_t = ENLE ltps_t lfiltr1 ;
  un1    = ENLE un1    lfiltr1 ;
  lepu1  = ENLE lepu1  lfiltr1 ;
  dt     = ENLE dt     lfiltr1 ;
  asig1 = (un1 - dt) * you * lepu1 ;
  an01 = EVOL 'TURQ' 'MANU' 'Temps' ltps_t 'D'    dt    ;
  tpst_t = IPOL end_t dt ltps_t ;
  an11 = EVOL 'TURQ' 'MANU' 'EPXX'  lepu1  'SMXX' asig1 ;
  sigt_t = IPOL tpst_t ltps_t asig1 ;
  epst_t = IPOL tpst_t ltps_t lepu1 ;

** Sol.Ana.Compression
  nb2 = DIME ltps_c ;
  un2 = PROG nb2 * 1.D0 ;
  lepd02 = PROG nb2 * epd0 ;
  lac2 = PROG nb2 * ac ;
* defo.unidim.
  lepu2 = (IPOL ltps_c ec1) / long ;
* defo.eq.Mazars (eps.tild) compression = racine(2)*nu*|defo.unidim.|
  lepe2 = (2.**0.5) * nu * (ABS lepu2) ;
  dc = un2 - ((epd0*(un2-lac2)/lepe2) + (ac*(EXP(bc*(lepd02-lepe2))))) ;
  lfiltr2 = LECT ;
  REPE b2 ;
    dc_i = EXTR dc &b2 ;
    SI (EGA &b2 1) ;
      dc_p = 1. ;
    FINSI ;
    ddc = dc_i - dc_p ;
    SI ((ddc < 0.) OU (dc_i < 0.) OU (dc_i > 1.)) ;
      lfiltr2 = lfiltr2 ET (LECT &b2) ;
    FINSI ;
    dc_p = dc_i ;
    SI (EGA &b2 (DIME dc)) ;
      QUIT b2 ;
    FINSI ;
  FIN b2 ;
  ltps_c = ENLE ltps_c lfiltr2 ;
  un2    = ENLE un2    lfiltr2 ;
  lepu2  = ENLE lepu2  lfiltr2 ;
  dc     = ENLE dc     lfiltr2 ;
  asig2 = (un2 - dc) * you * lepu2 ;
  an02 = EVOL 'TURQ' 'MANU' 'Temps' ltps_c 'D'    dc    ;
  tpsc_t = IPOL end_t dc ltps_c ;
  an12 = EVOL 'TURQ' 'MANU' 'EPXX'  lepu2  'SMXX' asig2 ;
  sigc_t = IPOL tpsc_t ltps_c asig2 ;
  epsc_t = IPOL tpsc_t ltps_c lepu2 ;
  SI ITRAC1 ;
    DESS (ev0 ET an01 ET an02) 'LEGE' 'SE' tleg 'TITR' (CHAI str4 ' ' '[3D PaF] Endommagement vs Temps') ;
    DESS (ev1 ET an11 ET an12) 'LEGE' 'NO' tleg 'TITR' (CHAI str4 ' ' '[3D PaF] Contrainte vs Deformation') ;
    DESS ev2 'TITR' (CHAI str4 ' ' '[3D PaF] Reaction vs Deplacement') 'LEGE' 'SE' tdess ;
  FINSI ;
* deformee
  REPE b3 (DIME tt) ;
    tps1 = tt . (&b3 - 1) ;
*   trace de la deformee (pour controle visuel)
    def1 = DEFO mail (tu . (&b3 - 1)) 33. 'ROUG' ;
    tit1 = CHAI str4 ' ' '[3D PaF] Deformee au temps' ' ' tps1 ;
    SI ITRAC1 ;
*      TRAC o1 (def0 ET def1) 'TITR' tit1 ;
    FINSI ;
  FIN b3 ;
  SI ITRAC1 ;
    TRAC o1 (def0 ET def1) 'TITR' tit1 ;
  FINSI ;
* comparaison Calcul / Reference sur la contrainte moyenne
*  Traction, courbes réduites
  lepu1_red = PROG ;
  asig1_red = PROG ;
  born_inf = EXTR lepu1 1 ;
  born_sup = epst_t ;
  REPE b_an11 (dime lepu1) ;
    xi = EXTR lepu1 &b_an11 ;
    yi = EXTR asig1 &b_an11 ;
    SI ((>EG xi born_inf) ET (<EG xi born_sup)) ;
      lepu1_red = lepu1_red et (PROG xi) ;
      asig1_red = asig1_red et (PROG yi) ;
    FINSI ;
  FIN b_an11 ;
  an11_red = EVOL 'TURQ' 'MANU' 'EPXX'  lepu1_red  'SMXX' asig1_red ;

  leps_red = PROG ;
  lsig_red = PROG ;
  ltps_red = PROG ;
  xp = 0. ;
  REPE b_ev1 (dime leps1) ;
    xi = EXTR leps1 &b_ev1 ;
    dx = xi - xp ;
    yi = EXTR lsig1 &b_ev1 ;
    ti = EXTR ltps &b_ev1 ;
    SI ((>EG xi born_inf) ET (<EG xi born_sup) ET (>EG dx 0)) ;
      leps_red = leps_red et (PROG xi) ;
      lsig_red = lsig_red et (PROG yi) ;
      ltps_red = ltps_red et (PROG ti) ;
    FINSI ;
    xp = xi ;
  FIN b_ev1 ;
  ev1_red = EVOL 'ROUG' 'MANU' 'EPXX'  leps_red 'SMXX' lsig_red ;

  lsiga_red = 'IPOL' an11_red leps_red ;
  ler1 = ABS (lsig_red - lsiga_red) / lsiga_red ;
  eer1 = EVOL 'ORAN' 'MANU' 'Temps'  ltps_red  'Ec.rel.SMXX' ler1 ;
  dtps = (EXTR ltps_red (DIME ltps_red)) - (EXTR ltps_red 1) ;
  mer1 = (INTG eer1) / dtps ;
  tit1 = CHAI str4 ' ' '[3D PaF] Ecart rel. |Calc.-Ref.|/Ref. en trac., Moy.int.|Ecart|' ' ' mer1 ;
  SI ITRAC1 ;
    DESS eer1 'TITR' tit1 ;
  FINSI ;

*  Compression, courbes réduites
  lepu2_red = PROG ;
  asig2_red = PROG ;
  born_inf = epsc_t ;
  born_sup = EXTR lepu2 (DIME lepu2) ;
  REPE b_an12 (dime lepu2) ;
    xi = EXTR lepu2 &b_an12 ;
    yi = EXTR asig2 &b_an12 ;
    SI ((<EG xi born_inf) ET (>EG xi born_sup)) ;
      lepu2_red = lepu2_red et (PROG xi) ;
      asig2_red = asig2_red et (PROG yi) ;
    FINSI ;
  FIN b_an12 ;
  an12_red = EVOL 'TURQ' 'MANU' 'EPXX'  lepu2_red  'SMXX' asig2_red ;

  leps_red = PROG ;
  lsig_red = PROG ;
  ltps_red = PROG ;
  xp = 0. ;
  REPE b_ev1 (dime leps1) ;
    xi = EXTR leps1 &b_ev1 ;
    dx = xi - xp ;
    yi = EXTR lsig1 &b_ev1 ;
    ti = EXTR ltps &b_ev1 ;
    SI ((<EG xi born_inf) ET (>EG xi born_sup)) ;
      leps_red = leps_red et (PROG xi) ;
      lsig_red = lsig_red et (PROG yi) ;
      ltps_red = ltps_red et (PROG ti) ;
    FINSI ;
    xp = xi ;
  FIN b_ev1 ;
  ev1_red = EVOL 'ROUG' 'MANU' 'EPXX'  leps_red 'SMXX' lsig_red ;

  lsiga_red = 'IPOL' an12_red leps_red ;
  ler2 = ABS ((lsig_red - lsiga_red) / lsiga_red) ;
  eer2 = EVOL 'ORAN' 'MANU' 'Temps'  ltps_red  '|Ec.rel|SMXX' ler2 ;
  dtps = (EXTR ltps_red (DIME ltps_red)) - (EXTR ltps_red 1) ;
  mer2 = (INTG eer2) / dtps ;
  tit2 = CHAI str4 ' ' '[3D PaF] Val.abs.Ec.rel.|(Calc-Ref)/Ref| en compr., Moy.int.|Ecart|' ' ' mer2 ;
  SI ITRAC1 ;
    DESS eer2 'TITR' tit2 ;
  FINSI ;
  tdes1 = 'TABLE' ;
  tdes1.'TITRE' = 'TABLE' ;
  tdes1 . 1 = MOT 'MARQ CROI' ;
  tdes1 . 'TITRE' . 1 = MOT 'Traction' ;
  tdes1 . 2 = MOT 'MARQ PLUS' ;
  tdes1 . 'TITRE' . 2 = MOT 'Compression' ;
  tit1 = CHAI str4 ' ' '[3D PaF] |Ec.r|, Moy.int.|Ec.r| en trac.' mer1 ' - compr.' mer2 ;
  SI ITRAC1 ;
    DESS (eer1 et eer2) 'LEGE' 'NE' tdes1 'TITR' tit1 ;
  FINSI ;
  OPTI ECHO 0 ;
  SAUT 1 LIGN ;
  MESS ' *********** C A S  #2  :  3 D   P O U T R E   A   F I B R E ************';
  SAUT 1 LIGN ;
  SI ((MAXI mer1 mer2) < 1.E-6) ;
    MESS ' Moy.int. Val.abs. Ecart relatif entre Calcul et Reference' ;
    MESS ' - phase 1.Traction' ' ' mer1 ;
    MESS ' - phase 2.Compression' ' ' mer2 ;
    MESS ' - maximum des 2 phases' ' ' (MAXI mer1 mer2) ' < 1.E-06 => OK' ;
    SAUT 1 LIGN ;
  SINO ;
    MESS ' Moy.int. Val.abs. Ecart relatif entre Calcul et Reference' ;
    MESS ' - phase 1.Traction' ' ' mer1 ;
    MESS ' - phase 2.Compression' ' ' mer2 ;
    MESS ' - maximum des 2 phases' ' ' (MAXI mer1 mer2) ' > 1.E-06 => ECHEC' ;
    IERR = VRAI ;
    SAUT 1 LIGN ;
  FINS ;
  SAUT 1 LIGN ;
  OPTI ECHO 1 ;
FINSI ;


******* C A S  #3  :  2 D   C O N T R A I N T E S   P L A N E S ********
SI (EXIS lcas 3) ;

** Options generales
  OPTI 'DIME' 2 'MODE' 'PLAN' 'CONT' 'ELEM' 'QUA4' ;

** Maillage
  p1      = 0. 0. ;
  p2      = 0. long ;
  sgauche = DROI 1 p1 p2 ;
  mail    = sgauche TRAN 1 (long 0.) ;
  sdroite = mail COTE 3 ;
  p3      = sdroite POIN 'PROC' (long 0.) ;
  mes1    = MESU mail ;
cadr1 = COUL ((0. 1.05) ET (1.01 1.05)) 'BLAN' ;
rep1 = @REPERE (-0.2 -0.2) (PROG 0.5 0.5) 'TURQ' ;
SI ITRAC1 ;
  TRAC 'QUAL' (cadr1 ET rep1 ET mail ET (sgauche COUL 'VERT') ET (sdroite COUL 'ROUG')) 'TITR' (CHAI str4 ' ' '[2D Plan cont.] Maillage') ;
FINSI ;

** Modele et caracteristiques materiau (&BCALC : 1->Cast3M, 2->MFront)
SI (EGA &BCALC 1) ;
  mo = MODE mail 'MECANIQUE' 'ELASTIQUE' 'ENDOMMAGEMENT' 'MAZARS' ;
  ma = MATE mo 'YOUN' you 'NU' nu 'KTR0' epd0 'ACOM' ac 'BCOM' bc 'ATRA' at 'BTRA' bt 'BETA' beta 'DIM3' epai ;
SINO ;
  coel = MOTS 'YOUN' 'NU' 'RHO' 'ALPH' 'DIM3' 'TALP' 'TREF' 'ACOM' 'BCOM' 'ATRA' 'BTRA' 'BETA' 'EPSD';
  statev = MOTS 'DCOM' 'DTRA' 'ALFT' 'ALFC' 'D' 'ETOZ';
  mo = MODE mail 'MECANIQUE' 'ELASTIQUE' 'NON_LINEAIRE' 'UTILISATEUR' 'LIB_LOI' 'libUmatBehaviour.so' 'FCT_LOI' 'umatmazars' 'C_MATERIAU' coel 'C_VARINTER' statev;
  ma = MATE mo 'YOUN' you 'NU' nu 'RHO' xrho 'ALPH' xalph 'DIM3' epai 'TALP' xtalp 'TREF' xtref 'ACOM' ac 'BCOM' bc 'ATRA' at 'BTRA' bt 'BETA' beta 'EPSD' epd0;
FINSI ;

** Blocages
  blgauche = BLOQ 'UX' sgauche ;
  bldroite = BLOQ 'UX' sdroite ;
  blrig    = BLOQ 'UY' p1 ;
  bl       = blgauche ET bldroite ET blrig ;

** Chargements
  didroite = DEPI bldroite 1. ;
  ec1      = EVOL 'MANU' (PROG 0.  (0.5*inst_a)  inst_a  1.   )
                         (PROG 0.  utmax         0.      ucmax) ;
  cha      = CHAR 'DIMP' didroite ec1 ;

** Tracé des blocages et du chargement
  re0 = @REPERE (-0.2 -0.2) (PROG 0.5 0.5) ;
  mor = MODE re0 'MECANIQUE' 'BARR' ;
  mar = MATE mor 'YOUN' 1. 'NU' 1. 'SECT' 1. ;
  rir = RIGI mor mar ;
  vf  = VECT didroite 'FLX' ' ' 'ROUG' ;
  SI ITRAC1 ;
    TRAC ((RIGI mo ma) ET blgauche ET blrig ET rir) vf 'NOLE' 'TITR' (CHAI str4 ' ' '[2D Plan cont.] Blocages et chargement') ;
  FINSI ;

** Resolution
  t                               = TABL ;
  t . 'MODELE'                    = mo ;
  t . 'CARACTERISTIQUES'          = ma ;
  t . 'BLOCAGES_MECANIQUES'       = bl ;
  t . 'CHARGEMENT'                = cha ;
  t . 'TEMPS_CALCULES'            = PROG 0. 'PAS' 3.E-3 (0.5*inst_a)
                                            'PAS' 3.E-3 inst_a
                                            'PAS' 1.E-2 1. ;
  t . 'MES_SAUVEGARDES'           = TABL ;
  t . 'MES_SAUVEGARDES' . 'DEFTO' = VRAI ;
  PASAPAS t ;

** Post traitement
* courbes : endommagement moyen vs temps
*           contrainte moyenne vs deformation moyenne
*           force de reaction vs deplacement impose
  tt = t . 'TEMPS' ;
  tc = t . 'CONTRAINTES' ;
  te = t . 'DEFORMATIONS' ;
  tv = t . 'VARIABLES_INTERNES' ;
  tu = t . 'DEPLACEMENTS' ;
  tr = t . 'REACTIONS' ;
  def0 = DEFO (cadr1 ET rep1 ET mail) (tu . 0) 0. ;
  ltps   = PROG ;
  ltps_t = PROG ;
  ltps_c = PROG ;
  lend = PROG ;
  lsig = PROG ;
  leps = PROG ;
  ldep = PROG ;
  lrea = PROG ;
  end_p = 0. ;
  REPE b0 (DIME tt) ;
    tps1 = tt . (&b0 - 1) ;
*   Liste des instants : globale (ltps) de traction (ltps_t) de compression (ltps_c)
    ltps = ltps ET tps1 ;
    SI (<EG tps1 inst_a) ;
      ltps_t = ltps_t ET tps1 ;
    SINON ;
      ltps_c = ltps_c ET tps1 ;
    FINSI ;
    end1 = (INTG mo (tv . (&b0 - 1)) 'D')    / mes1 ;
    sig1 = (INTG mo (tc . (&b0 - 1)) 'SMXX') / mes1 ;
    eps1 = (INTG mo (te . (&b0 - 1)) 'EPXX') / mes1 ;
    u1   = EXTR (tu . (&b0 - 1)) 'UX' p3 ;
    rea1 = 0. ;
    SI (NEG &b0 1) ;
      rea1 = @TOTAL (tr . (&b0 - 1)) sgauche 'FX' ;
    FINSI ;
    lend = lend ET end1 ;
    lsig = lsig ET sig1 ;
    leps = leps ET eps1 ;
    ldep = ldep ET u1 ;
    lrea = lrea ET rea1 ;
*   Endommagement de transition traction-compression end_t
    dd1 = end1 - end_p ;
    SI ((> end1 0.) ET (EGA dd1 0.)) ;
      end_t = end1 ;
    SINON ;
    FINSI ;
    end_p = end1 ;
  FIN b0 ;
  ev0 = EVOL 'ROUG' 'MANU' 'Temps' ltps 'D'    lend ;
  ev1 = EVOL 'ROUG' 'MANU' 'EPXX'  leps 'SMXX' lsig ;
  ev2 = EVOL 'ROUG' 'MANU' 'UX'    ldep 'FX'   lrea ;
** Sol.Ana.Traction
  ltps_t =  ENLE (ENLE ltps_t (DIME ltps_t)) 1 ;
  nb1 = DIME ltps_t ;
  un1 = PROG nb1 * 1.D0 ;
  lepd01 = PROG nb1 * epd0 ;
  lat1 = PROG nb1 * at ;
* defo.unidim.
  lepu1 = (IPOL ltps_t ec1) / long ;
* defo.eq.Mazars (eps.tild) traction = defo.unidim.
  lepe1 = lepu1 ;
  dt = un1 - ((epd0*(un1-lat1)/lepe1) + (at*(EXP(bt*(lepd01-lepe1))))) ;
  lfiltr1 = LECT ;
  REPE b1 ;
    dt_i = EXTR dt &b1 ;
    SI (EGA &b1 1) ;
      dt_p = 0. ;
    FINSI ;
    ddt = dt_i - dt_p ;
    SI ((ddt < 0.) OU (dt_i < 0.) OU (dt_i > 1.)) ;
      lfiltr1 = lfiltr1 ET (LECT &b1) ;
    FINSI ;
    dt_p = dt_i ;
    SI (EGA &b1 (DIME dt)) ;
      QUIT b1 ;
    FINSI ;
  FIN b1 ;
  ltps_t = ENLE ltps_t lfiltr1 ;
  un1    = ENLE un1    lfiltr1 ;
  lepu1  = ENLE lepu1  lfiltr1 ;
  dt     = ENLE dt     lfiltr1 ;
  lsig1 = (un1 - dt) * you * lepu1 ;
  an01 = EVOL 'TURQ' 'MANU' 'Temps' ltps_t 'D'    dt    ;
  tpst_t = IPOL end_t dt ltps_t ;
  an11 = EVOL 'TURQ' 'MANU' 'EPXX'  lepu1  'SMXX' lsig1 ;
  sigt_t = IPOL tpst_t ltps_t lsig1 ;
  epst_t = IPOL tpst_t ltps_t lepu1 ;

** Sol.Ana.Compression
  nb2 = DIME ltps_c ;
  un2 = PROG nb2 * 1.D0 ;
  lepd02 = PROG nb2 * epd0 ;
  lac2 = PROG nb2 * ac ;
* defo.unidim.
  lepu2 = (IPOL ltps_c ec1) / long ;
* defo.eq.Mazars (eps.tild) compression = racine(2)*nu*|defo.unidim.|
  lepe2 = (2.**0.5) * nu * (ABS lepu2) ;
  dc = un2 - ((epd0*(un2-lac2)/lepe2) + (ac*(EXP(bc*(lepd02-lepe2))))) ;
  lfiltr2 = LECT ;
  REPE b2 ;
    dc_i = EXTR dc &b2 ;
    SI (EGA &b2 1) ;
      dc_p = 1. ;
    FINSI ;
    ddc = dc_i - dc_p ;
    SI ((ddc < 0.) OU (dc_i < 0.) OU (dc_i > 1.)) ;
      lfiltr2 = lfiltr2 ET (LECT &b2) ;
    FINSI ;
    dc_p = dc_i ;
    SI (EGA &b2 (DIME dc)) ;
      QUIT b2 ;
    FINSI ;
  FIN b2 ;
  ltps_c = ENLE ltps_c lfiltr2 ;
  un2    = ENLE un2    lfiltr2 ;
  lepu2  = ENLE lepu2  lfiltr2 ;
  dc     = ENLE dc     lfiltr2 ;
  lsig2 = (un2 - dc) * you * lepu2 ;
  an02 = EVOL 'TURQ' 'MANU' 'Temps' ltps_c 'D'    dc    ;
  tpsc_t = IPOL end_t dc ltps_c ;
  an12 = EVOL 'TURQ' 'MANU' 'EPXX'  lepu2  'SMXX' lsig2 ;
  sigc_t = IPOL tpsc_t ltps_c lsig2 ;
  epsc_t = IPOL tpsc_t ltps_c lepu2 ;
  SI ITRAC1 ;
    DESS (ev0 ET an01 ET an02) 'TITR' (CHAI str4 ' ' '[2D Plan cont.] Endommagement vs Temps') 'LEGE' 'SE' tdess ;
    DESS (ev1 ET an11 ET an12) 'TITR' (CHAI str4 ' ' '[2D Plan cont.] Contrainte vs Deformation') 'LEGE' 'NO' tdess ;
    DESS ev2 'TITR' (CHAI str4 ' ' '[2D Plan cont.] Reaction vs Deplacement') 'LEGE' 'SE' tdess ;
  FINSI ;
* evolutions temporelles a tous les points de Gauss
  ng = 4 ;
  tleg = TABL ;
  tleg . 1 = MOT 'MARQ CARR NOLI' ;
  tleg . 2 = MOT 'MARQ LOSA NOLI' ;
  tleg . 3 = MOT 'MARQ ROND NOLI' ;
  tleg . 4 = MOT 'MARQ ETOI NOLI' ;
  tleg . 'TITRE' = TABL ;
  REPE b ng ;
    tleg . 'TITRE' . &b = CHAI 'Cal_mat_' str3 '_Pt_Gauss' ' ' &b ;
  FIN b ;
* endommagement
  evend = VIDE 'EVOLUTIO' ;
  REPE b ng ;
    evend = evend ET (EVOL 'ROSE' 'TEMP' t 'VARIABLES_INTERNES' 'D' 1 1 &b) ;
  FIN b ;
  tleg . (ng+1) = MOT 'MARQ CROI REGU' ;
  tleg . 'TITRE' . (ng+1) = MOT 'Ref_Traction' ;
  tleg . (ng+2) = MOT 'MARQ PLUS REGU' ;
  tleg . 'TITRE' . (ng+2) = MOT 'Ref_Compression' ;
  SI ITRAC1 ;
    DESS (evend ET an01 ET an02) 'LEGE' 'SE' tleg 'TITR' (CHAI str4 ' ' '[2D Plan cont.] D vs Temps') ;
  FINSI ;
* contrainte
  evsmxx = VIDE 'EVOLUTIO' ;
  REPE b ng ;
    evsmxx = evsmxx ET (EVOL 'BLEU' 'TEMP' t 'CONTRAINTES' 'SMXX' 1 1 &b) ;
  FIN b ;
  ansmxx1 = EVOL 'TURQ' 'MANU' 'Temps' ltps_t 'SMXX' lsig1 ;
  ansmxx2 = EVOL 'TURQ' 'MANU' 'Temps' ltps_c 'SMXX' lsig2 ;
  SI ITRAC1 ;
    DESS (evsmxx ET ansmxx1 ET ansmxx2) 'LEGE' 'NE' tleg 'TITR' (CHAI str4 ' ' '[2D Plan cont.] SMXX vs Temps') ;
  FINSI ;
* deformation
  evepxx = VIDE 'EVOLUTIO' ;
  REPE b ng ;
    evepxx = evepxx ET (EVOL 'VERT' 'TEMP' t 'DEFORMATIONS' 'EPXX' 1 1 &b) ;
  FIN b ;
  SI ITRAC1 ;
    DESS evepxx 'LEGE' tleg 'TITR' (CHAI str4 ' ' '[2D Plan cont.] EPXX vs Temps') ;
  FINSI ;
* deformee
  REPE b3 (DIME tt) ;
    tps1 = tt . (&b3 - 1) ;
*   trace de la deformee (pour controle visuel)
    def1 = DEFO mail (tu . (&b3 - 1)) 33. 'ROUG' ;
    tit1 = CHAI str4 ' ' '[2D Plan cont.] Deformee au temps' ' ' tps1 ;
    SI ITRAC1 ;
*      TRAC (def0 ET def1) 'TITR' tit1 ;
    FINSI ;
  FIN b3 ;
  SI ITRAC1 ;
    TRAC (def0 ET def1) 'TITR' tit1 ;
  FINSI ;
* comparaison Calcul / Reference sur la contrainte moyenne
*  Traction, courbes réduites
  lepu1_red = PROG ;
  lsig1_red = PROG ;
  born_inf = EXTR lepu1 1 ;
  born_sup = epst_t ;
  REPE b_an11 (dime lepu1) ;
    xi = EXTR lepu1 &b_an11 ;
    yi = EXTR lsig1 &b_an11 ;
    SI ((>EG xi born_inf) ET (<EG xi born_sup)) ;
      lepu1_red = lepu1_red et (PROG xi) ;
      lsig1_red = lsig1_red et (PROG yi) ;
    FINSI ;
  FIN b_an11 ;
  an11_red = EVOL 'TURQ' 'MANU' 'EPXX'  lepu1_red  'SMXX' lsig1_red ;

  leps_red = PROG ;
  lsig_red = PROG ;
  ltps_red = PROG ;
  xp = 0. ;
  REPE b_ev1 (dime leps) ;
    xi = EXTR leps &b_ev1 ;
    dx = xi - xp ;
    yi = EXTR lsig &b_ev1 ;
    ti = EXTR ltps &b_ev1 ;
    SI ((>EG xi born_inf) ET (<EG xi born_sup) ET (>EG dx 0)) ;
      leps_red = leps_red et (PROG xi) ;
      lsig_red = lsig_red et (PROG yi) ;
      ltps_red = ltps_red et (PROG ti) ;
    FINSI ;
    xp = xi ;
  FIN b_ev1 ;
  ev1_red = EVOL 'ROUG' 'MANU' 'EPXX'  leps_red 'SMXX' lsig_red ;

  lsiga_red = 'IPOL' an11_red leps_red ;
  ler1 = ABS (lsig_red - lsiga_red) / lsiga_red ;
  eer1 = EVOL 'ORAN' 'MANU' 'Temps'  ltps_red  'Ec.rel.SMXX' ler1 ;
  dtps = (EXTR ltps_red (DIME ltps_red)) - (EXTR ltps_red 1) ;
  mer1 = (INTG eer1) / dtps ;
  tit1 = CHAI str4 ' ' '[2D Plan cont.] Ecart rel. |Calc.-Ref.|/Ref. en trac., Moy.int.|Ecart|' ' ' mer1 ;
  SI ITRAC1 ;
    DESS eer1 'TITR' tit1 ;
  FINSI ;

*  Compression, courbes réduites
  lepu2_red = PROG ;
  lsig2_red = PROG ;
  born_inf = epsc_t ;
  born_sup = EXTR lepu2 (DIME lepu2) ;
  REPE b_an12 (dime lepu2) ;
    xi = EXTR lepu2 &b_an12 ;
    yi = EXTR lsig2 &b_an12 ;
    SI ((<EG xi born_inf) ET (>EG xi born_sup)) ;
      lepu2_red = lepu2_red et (PROG xi) ;
      lsig2_red = lsig2_red et (PROG yi) ;
    FINSI ;
  FIN b_an12 ;
  an12_red = EVOL 'TURQ' 'MANU' 'EPXX'  lepu2_red  'SMXX' lsig2_red ;

  leps_red = PROG ;
  lsig_red = PROG ;
  ltps_red = PROG ;
  xp = 0. ;
  REPE b_ev1 (dime leps) ;
    xi = EXTR leps &b_ev1 ;
    dx = xi - xp ;
    yi = EXTR lsig &b_ev1 ;
    ti = EXTR ltps &b_ev1 ;
    SI ((<EG xi born_inf) ET (>EG xi born_sup)) ;
      leps_red = leps_red et (PROG xi) ;
      lsig_red = lsig_red et (PROG yi) ;
      ltps_red = ltps_red et (PROG ti) ;
    FINSI ;
    xp = xi ;
  FIN b_ev1 ;
  ev1_red = EVOL 'ROUG' 'MANU' 'EPXX'  leps_red 'SMXX' lsig_red ;

  lsiga_red = 'IPOL' an12_red leps_red ;
  ler2 = ABS ((lsig_red - lsiga_red) / lsiga_red) ;
  eer2 = EVOL 'ORAN' 'MANU' 'Temps'  ltps_red  '|Ec.rel|SMXX' ler2 ;
  dtps = (EXTR ltps_red (DIME ltps_red)) - (EXTR ltps_red 1) ;
  mer2 = (INTG eer2) / dtps ;
  tit2 = CHAI str4 ' ' '[2D Plan cont.] Val.abs.Ec.rel.|(Calc-Ref)/Ref| en compr., Moy.int.|Ecart|' ' ' mer2 ;
  SI ITRAC1 ;
    DESS eer2 'TITR' tit2 ;
  FINSI ;
  tdes1 = 'TABLE' ;
  tdes1.'TITRE' = 'TABLE' ;
  tdes1 . 1 = MOT 'MARQ CROI' ;
  tdes1 . 'TITRE' . 1 = MOT 'Traction' ;
  tdes1 . 2 = MOT 'MARQ PLUS' ;
  tdes1 . 'TITRE' . 2 = MOT 'Compression' ;
  tit1 = CHAI str4 ' ' '[2D Plan cont.] |Ec.r|, Moy.int.|Ec.r| en trac.' mer1 ' - compr.' mer2 ;
  SI ITRAC1 ;
    DESS (eer1 et eer2) 'LEGE' 'NE' tdes1 'TITR' tit1 ;
  FINSI ;

** Sauvegarde des resultats de calcul Cast3M (reference pour MFront) au format .csv
  SI ISAUV ;
    str2 = '2D_CP_' ;
    fic1 = CHAI str1 str2 str3 '.csv' ;
    OPTI SORT fic1 ;
    SORT 'EXCE' ev1 'DIGI' 16 ;
  FINSI ;

  OPTI ECHO 0 ;
  SAUT 1 LIGN ;
  MESS ' ******* C A S  #3  :  2 D   C O N T R A I N T E S   P L A N E S ********';
  SAUT 1 LIGN ;
  SI ((MAXI mer1 mer2) < 1.E-6) ;
    MESS ' Moy.int. Val.abs. Ecart relatif entre Calcul et Reference' ;
    MESS ' - phase 1.Traction' ' ' mer1 ;
    MESS ' - phase 2.Compression' ' ' mer2 ;
    MESS ' - maximum des 2 phases' ' ' (MAXI mer1 mer2) ' < 1.E-06 => OK' ;
    SAUT 1 LIGN ;
  SINO ;
    MESS ' Moy.int. Val.abs. Ecart relatif entre Calcul et Reference' ;
    MESS ' - phase 1.Traction' ' ' mer1 ;
    MESS ' - phase 2.Compression' ' ' mer2 ;
    MESS ' - maximum des 2 phases' ' ' (MAXI mer1 mer2) ' > 1.E-06 => ECHEC' ;
    IERR = VRAI ;
    SAUT 1 LIGN ;
  FINS ;
  SAUT 1 LIGN ;
  OPTI ECHO 1 ;
FINSI ;


************ C A S  #4  :  2 D   A X I S Y M E T R I Q U E *************
SI (EXIS lcas 4) ;

** Options generales
  OPTI 'DIME' 2 'MODE' 'AXIS' 'ELEM' 'QUA4' ;

** Maillage
  p1      = 0. 0. ;
  p2      = long 0. ;
  sbas    = DROI 1 p1 p2 ;
  mail    = sbas TRAN 1 (0. long) ;
  shaut   = mail COTE 3 ;
  p3      = shaut POIN 'PROC' (0. long) ;
cadr1 = COUL ((0. 1.01) ET (1.05 1.01)) 'BLAN' ;
rep1 = @REPERE (-0.2 -0.2) (PROG 0.5 0.5) 'TURQ' ;
SI ITRAC1 ;
  TRAC 'QUAL' (cadr1 ET rep1 ET mail ET (sbas COUL 'VERT') ET (shaut COUL 'ROUG')) 'TITR' (CHAI str4 ' ' '[2D Axi.] Maillage') ;
FINSI ;

** Modele et caracteristiques materiau (&BCALC : 1->Cast3M, 2->MFront)
SI (EGA &BCALC 1) ;
  mo = MODE mail 'MECANIQUE' 'ELASTIQUE' 'ENDOMMAGEMENT' 'MAZARS' ;
  ma = MATE mo 'YOUN' you 'NU' nu 'KTR0' epd0 'ACOM' ac 'BCOM' bc 'ATRA' at 'BTRA' bt 'BETA' beta ;
SINO ;
  coel = MOTS 'YOUN' 'NU' 'RHO' 'ALPH' 'TALP' 'TREF' 'ACOM' 'BCOM' 'ATRA' 'BTRA' 'BETA' 'EPSD';
  statev = MOTS 'DCOM' 'DTRA' 'ALFT' 'ALFC' 'D';
  mo = MODE mail 'MECANIQUE' 'ELASTIQUE' 'NON_LINEAIRE' 'UTILISATEUR' 'LIB_LOI' 'libUmatBehaviour.so' 'FCT_LOI' 'umatmazars' 'C_MATERIAU' coel 'C_VARINTER' statev;
  ma = MATE mo 'YOUN' you 'NU' nu 'RHO' xrho 'ALPH' xalph 'TALP' xtalp 'TREF' xtref 'ACOM' ac 'BCOM' bc 'ATRA' at 'BTRA' bt 'BETA' beta 'EPSD' epd0;
FINSI ;
  zer = ZERO mo 'NOEUD' ;
  un  = zer + 1. ;
  mes1 = INTG mo un 'SCAL' ;

** Blocages
  blbas    = BLOQ 'UZ' sbas ;
  blhaut   = BLOQ 'UZ' shaut ;
  bl       = blbas ET blhaut ;

** Chargements
  dihaut   = DEPI blhaut 1. ;
  ec1      = EVOL 'MANU' (PROG 0.  (0.5*inst_a)  inst_a  1.   )
                         (PROG 0.  utmax         0.      ucmax) ;
  cha      = CHAR 'DIMP' dihaut ec1 ;

** Tracé des blocages et du chargement
  re0 = @REPERE (-0.2 -0.2) (PROG 0.5 0.5) ;
  mor = MODE re0 'MECANIQUE' 'BARR' ;
  mar = MATE mor 'YOUN' 1. 'NU' 1. 'SECT' 1. ;
  rir = RIGI mor mar ;
  vf  = VECT dihaut ' ' 'FLX' 'ROUG' ;
  SI ITRAC1 ;
    TRAC ((RIGI mo ma) ET blbas ET rir) vf 'NOLE' 'TITR' (CHAI str4 ' ' '[2D Axi.] Blocages et chargement') ;
  FINSI ;

** Resolution
  t                               = TABL ;
  t . 'MODELE'                    = mo ;
  t . 'CARACTERISTIQUES'          = ma ;
  t . 'BLOCAGES_MECANIQUES'       = bl ;
  t . 'CHARGEMENT'                = cha ;
  t . 'TEMPS_CALCULES'            = PROG 0. 'PAS' 3.E-3 (0.5*inst_a)
                                            'PAS' 3.E-3 inst_a
                                            'PAS' 1.E-2 1. ;
  t . 'MOVA'                      = MOT 'D' ;
  t . 'MES_SAUVEGARDES'           = TABL ;
  t . 'MES_SAUVEGARDES' . 'DEFTO' = VRAI ;
  PASAPAS t ;

** Post traitement
* courbes : endommagement moyen vs temps
*           contrainte moyenne vs deformation moyenne
*           force de reaction vs deplacement impose
  tt = t . 'TEMPS' ;
  tc = t . 'CONTRAINTES' ;
  te = t . 'DEFORMATIONS' ;
  tv = t . 'VARIABLES_INTERNES' ;
  tu = t . 'DEPLACEMENTS' ;
  tr = t . 'REACTIONS' ;
  def0 = DEFO (cadr1 ET rep1 ET mail) (tu . 0) 0. ;
  ltps   = PROG ;
  ltps_t = PROG ;
  ltps_c = PROG ;
  lend = PROG ;
  lsig = PROG ;
  leps = PROG ;
  ldep = PROG ;
  lrea = PROG ;
  end_p = 0. ;
  REPE b0 (DIME tt) ;
    tps1 = tt . (&b0 - 1) ;
*   Liste des instants : globale (ltps) de traction (ltps_t) de compression (ltps_c)
    ltps = ltps ET tps1 ;
    SI (<EG tps1 inst_a) ;
      ltps_t = ltps_t ET tps1 ;
    SINON ;
      ltps_c = ltps_c ET tps1 ;
    FINSI ;
    end1 = (INTG mo (tv . (&b0 - 1)) 'D')    / mes1 ;
    sig1 = (INTG mo (tc . (&b0 - 1)) 'SMZZ') / mes1 ;
    eps1 = (INTG mo (te . (&b0 - 1)) 'EPZZ') / mes1 ;
    u1   = EXTR (tu . (&b0 - 1)) 'UZ' p3 ;
    rea1 = 0. ;
    SI (NEG &b0 1) ;
      rea1 = @TOTAL (tr . (&b0 - 1)) sbas 'FZ' ;
    FINSI ;
    lend = lend ET end1 ;
    lsig = lsig ET sig1 ;
    leps = leps ET eps1 ;
    ldep = ldep ET u1 ;
    lrea = lrea ET rea1 ;
*   Endommagement de transition traction-compression end_t
    dd1 = end1 - end_p ;
    SI ((> end1 0.) ET (EGA dd1 0.)) ;
      end_t = end1 ;
    SINON ;
    FINSI ;
    end_p = end1 ;
  FIN b0 ;
  ev0 = EVOL 'ROUG' 'MANU' 'Temps' ltps 'D'    lend ;
  ev1 = EVOL 'ROUG' 'MANU' 'EPZZ'  leps 'SMZZ' lsig ;
  ev2 = EVOL 'ROUG' 'MANU' 'UZ'    ldep 'FZ'   lrea ;
** Sol.Ana.Traction
  ltps_t =  ENLE (ENLE ltps_t (DIME ltps_t)) 1 ;
  nb1 = DIME ltps_t ;
  un1 = PROG nb1 * 1.D0 ;
  lepd01 = PROG nb1 * epd0 ;
  lat1 = PROG nb1 * at ;
* defo.unidim.
  lepu1 = (IPOL ltps_t ec1) / long ;
* defo.eq.Mazars (eps.tild) traction = defo.unidim.
  lepe1 = lepu1 ;
  dt = un1 - ((epd0*(un1-lat1)/lepe1) + (at*(EXP(bt*(lepd01-lepe1))))) ;
  lfiltr1 = LECT ;
  REPE b1 ;
    dt_i = EXTR dt &b1 ;
    SI (EGA &b1 1) ;
      dt_p = 0. ;
    FINSI ;
    ddt = dt_i - dt_p ;
    SI ((ddt < 0.) OU (dt_i < 0.) OU (dt_i > 1.)) ;
      lfiltr1 = lfiltr1 ET (LECT &b1) ;
    FINSI ;
    dt_p = dt_i ;
    SI (EGA &b1 (DIME dt)) ;
      QUIT b1 ;
    FINSI ;
  FIN b1 ;
  ltps_t = ENLE ltps_t lfiltr1 ;
  un1    = ENLE un1    lfiltr1 ;
  lepu1  = ENLE lepu1  lfiltr1 ;
  dt     = ENLE dt     lfiltr1 ;
  lsig1 = (un1 - dt) * you * lepu1 ;
  an01 = EVOL 'TURQ' 'MANU' 'Temps' ltps_t 'D'    dt    ;
  tpst_t = IPOL end_t dt ltps_t ;
  an11 = EVOL 'TURQ' 'MANU' 'EPXX'  lepu1  'SMXX' lsig1 ;
  sigt_t = IPOL tpst_t ltps_t lsig1 ;
  epst_t = IPOL tpst_t ltps_t lepu1 ;

** Sol.Ana.Compression
  nb2 = DIME ltps_c ;
  un2 = PROG nb2 * 1.D0 ;
  lepd02 = PROG nb2 * epd0 ;
  lac2 = PROG nb2 * ac ;
* defo.unidim.
  lepu2 = (IPOL ltps_c ec1) / long ;
* defo.eq.Mazars (eps.tild) compression = racine(2)*nu*|defo.unidim.|
  lepe2 = (2.**0.5) * nu * (ABS lepu2) ;
  dc = un2 - ((epd0*(un2-lac2)/lepe2) + (ac*(EXP(bc*(lepd02-lepe2))))) ;
  lfiltr2 = LECT ;
  REPE b2 ;
    dc_i = EXTR dc &b2 ;
    SI (EGA &b2 1) ;
      dc_p = 1. ;
    FINSI ;
    ddc = dc_i - dc_p ;
    SI ((ddc < 0.) OU (dc_i < 0.) OU (dc_i > 1.)) ;
      lfiltr2 = lfiltr2 ET (LECT &b2) ;
    FINSI ;
    dc_p = dc_i ;
    SI (EGA &b2 (DIME dc)) ;
      QUIT b2 ;
    FINSI ;
  FIN b2 ;
  ltps_c = ENLE ltps_c lfiltr2 ;
  un2    = ENLE un2    lfiltr2 ;
  lepu2  = ENLE lepu2  lfiltr2 ;
  dc     = ENLE dc     lfiltr2 ;
  lsig2 = (un2 - dc) * you * lepu2 ;
  an02 = EVOL 'TURQ' 'MANU' 'Temps' ltps_c 'D'    dc    ;
  tpsc_t = IPOL end_t dc ltps_c ;
  an12 = EVOL 'TURQ' 'MANU' 'EPXX'  lepu2  'SMXX' lsig2 ;
  sigc_t = IPOL tpsc_t ltps_c lsig2 ;
  epsc_t = IPOL tpsc_t ltps_c lepu2 ;
  SI ITRAC1 ;
    DESS (ev0 ET an01 ET an02) 'TITR' (CHAI str4 ' ' '[2D Axi.] Endommagement vs Temps') 'LEGE' 'SE' tdess ;
    DESS (ev1 ET an11 ET an12) 'TITR' (CHAI str4 ' ' '[2D Axi.] Contrainte vs Deformation') 'LEGE' 'NO' tdess ;
    DESS ev2 'TITR' (CHAI str4 ' ' '[2D Axi.] Reaction vs Deplacement') 'LEGE' 'SE' tdess ;
  FINSI ;
* evolutions temporelles a tous les points de Gauss
  ng = 4 ;
  tleg = TABL ;
  tleg . 1 = MOT 'MARQ CARR NOLI' ;
  tleg . 2 = MOT 'MARQ LOSA NOLI' ;
  tleg . 3 = MOT 'MARQ ROND NOLI' ;
  tleg . 4 = MOT 'MARQ ETOI NOLI' ;
  tleg . 'TITRE' = TABL ;
  REPE b ng ;
    tleg . 'TITRE' . &b = CHAI 'Cal_mat_' str3 '_Pt_Gauss' ' ' &b ;
  FIN b ;
* endommagement
  evend = VIDE 'EVOLUTIO' ;
  REPE b ng ;
    evend = evend ET (EVOL 'ROSE' 'TEMP' t 'VARIABLES_INTERNES' 'D' 1 1 &b) ;
  FIN b ;
  tleg . (ng+1) = MOT 'MARQ CROI REGU' ;
  tleg . 'TITRE' . (ng+1) = MOT 'Ref_Traction' ;
  tleg . (ng+2) = MOT 'MARQ PLUS REGU' ;
  tleg . 'TITRE' . (ng+2) = MOT 'Ref_Compression' ;
  SI ITRAC1 ;
    DESS (evend ET an01 ET an02) 'LEGE' 'SE' tleg 'TITR' (CHAI str4 ' ' '[2D Axi.] D vs Temps') ;
  FINSI ;
* contrainte
  evsmzz = VIDE 'EVOLUTIO' ;
  REPE b ng ;
    evsmzz = evsmzz ET (EVOL 'BLEU' 'TEMP' t 'CONTRAINTES' 'SMZZ' 1 1 &b) ;
  FIN b ;
  ansmzz1 = EVOL 'TURQ' 'MANU' 'Temps' ltps_t 'SMXX' lsig1 ;
  ansmzz2 = EVOL 'TURQ' 'MANU' 'Temps' ltps_c 'SMXX' lsig2 ;
  SI ITRAC1 ;
    DESS (evsmzz ET ansmzz1 ET ansmzz2) 'LEGE' 'NE' tleg 'TITR' (CHAI str4 ' ' '[2D Axi.] SMZZ vs Temps') ;
  FINSI ;
* deformation
  evepzz = VIDE 'EVOLUTIO' ;
  REPE b ng ;
    evepzz = evepzz ET (EVOL 'VERT' 'TEMP' t 'DEFORMATIONS' 'EPZZ' 1 1 &b) ;
  FIN b ;
  SI ITRAC1 ;
    DESS evepzz 'LEGE' tleg 'TITR' (CHAI str4 ' ' '[2D Axi.] EPZZ vs Temps') ;
  FINSI ;
* deformee
  REPE b2 (DIME tt) ;
    tps1 = tt . (&b2 - 1) ;
*   trace de la deformee (pour controle visuel)
    def1 = DEFO mail (tu . (&b2 - 1)) 33. 'ROUG' ;
    tit1 = CHAI str4 ' ' '[2D Axi.] Deformee au temps' ' ' tps1 ;
    SI ITRAC1 ;
*      TRAC (def0 ET def1) 'TITR' tit1 ;
    FINSI ;
  FIN b2 ;
  SI ITRAC1 ;
    TRAC (def0 ET def1) 'TITR' tit1 ;
  FINSI ;
* comparaison Calcul / Reference sur la contrainte moyenne
*  Traction, courbes réduites
  lepu1_red = PROG ;
  lsig1_red = PROG ;
  born_inf = EXTR lepu1 1 ;
  born_sup = epst_t ;
  REPE b_an11 (dime lepu1) ;
    xi = EXTR lepu1 &b_an11 ;
    yi = EXTR lsig1 &b_an11 ;
    SI ((>EG xi born_inf) ET (<EG xi born_sup)) ;
      lepu1_red = lepu1_red et (PROG xi) ;
      lsig1_red = lsig1_red et (PROG yi) ;
    FINSI ;
  FIN b_an11 ;
  an11_red = EVOL 'TURQ' 'MANU' 'EPXX'  lepu1_red  'SMXX' lsig1_red ;

  leps_red = PROG ;
  lsig_red = PROG ;
  ltps_red = PROG ;
  xp = 0. ;
  REPE b_ev1 (dime leps) ;
    xi = EXTR leps &b_ev1 ;
    dx = xi - xp ;
    yi = EXTR lsig &b_ev1 ;
    ti = EXTR ltps &b_ev1 ;
    SI (((EGA xi born_inf 1.E-10) OU (> xi born_inf)) ET (<EG xi born_sup) ET (>EG dx 0)) ;
      leps_red = leps_red et (PROG xi) ;
      lsig_red = lsig_red et (PROG yi) ;
      ltps_red = ltps_red et (PROG ti) ;
    FINSI ;
    xp = xi ;
  FIN b_ev1 ;
  ev1_red = EVOL 'ROUG' 'MANU' 'EPXX'  leps_red 'SMXX' lsig_red ;

  lsiga_red = 'IPOL' an11_red leps_red ;
  ler1 = ABS (lsig_red - lsiga_red) / lsiga_red ;
  eer1 = EVOL 'ORAN' 'MANU' 'Temps'  ltps_red  'Ec.rel.SMXX' ler1 ;
  dtps = (EXTR ltps_red (DIME ltps_red)) - (EXTR ltps_red 1) ;
  mer1 = (INTG eer1) / dtps ;
  tit1 = CHAI str4 ' ' '[2D Axi.] Ecart rel. |Calc.-Ref.|/Ref. en trac., Moy.int.|Ecart|' ' ' mer1 ;
  SI ITRAC1 ;
    DESS eer1 'TITR' tit1 ;
  FINSI ;

*  Compression, courbes réduites
  lepu2_red = PROG ;
  lsig2_red = PROG ;
  born_inf = epsc_t ;
  born_sup = EXTR lepu2 (DIME lepu2) ;
  REPE b_an12 (dime lepu2) ;
    xi = EXTR lepu2 &b_an12 ;
    yi = EXTR lsig2 &b_an12 ;
    SI ((<EG xi born_inf) ET (>EG xi born_sup)) ;
      lepu2_red = lepu2_red et (PROG xi) ;
      lsig2_red = lsig2_red et (PROG yi) ;
    FINSI ;
  FIN b_an12 ;
  an12_red = EVOL 'TURQ' 'MANU' 'EPXX'  lepu2_red  'SMXX' lsig2_red ;

  leps_red = PROG ;
  lsig_red = PROG ;
  ltps_red = PROG ;
  xp = 0. ;
  REPE b_ev1 (dime leps) ;
    xi = EXTR leps &b_ev1 ;
    dx = xi - xp ;
    yi = EXTR lsig &b_ev1 ;
    ti = EXTR ltps &b_ev1 ;
    SI ((<EG xi born_inf) ET (>EG xi born_sup)) ;
      leps_red = leps_red et (PROG xi) ;
      lsig_red = lsig_red et (PROG yi) ;
      ltps_red = ltps_red et (PROG ti) ;
    FINSI ;
    xp = xi ;
  FIN b_ev1 ;
  ev1_red = EVOL 'ROUG' 'MANU' 'EPXX'  leps_red 'SMXX' lsig_red ;

  lsiga_red = 'IPOL' an12_red leps_red ;
  ler2 = ABS ((lsig_red - lsiga_red) / lsiga_red) ;
  eer2 = EVOL 'ORAN' 'MANU' 'Temps'  ltps_red  '|Ec.rel|SMXX' ler2 ;
  dtps = (EXTR ltps_red (DIME ltps_red)) - (EXTR ltps_red 1) ;
  mer2 = (INTG eer2) / dtps ;
  tit2 = CHAI str4 ' ' '[2D Axi.] Val.abs.Ec.rel.|(Calc-Ref)/Ref| en compr., Moy.int.|Ecart|' ' ' mer2 ;
  SI ITRAC1 ;
    DESS eer2 'TITR' tit2 ;
  FINSI ;
  tdes1 = 'TABLE' ;
  tdes1.'TITRE' = 'TABLE' ;
  tdes1 . 1 = MOT 'MARQ CROI' ;
  tdes1 . 'TITRE' . 1 = MOT 'Traction' ;
  tdes1 . 2 = MOT 'MARQ PLUS' ;
  tdes1 . 'TITRE' . 2 = MOT 'Compression' ;
  tit1 = CHAI str4 ' ' '[2D Axi.] |Ec.r|, Moy.int.|Ec.r| en trac.' mer1 ' - compr.' mer2 ;
  SI ITRAC1 ;
    DESS (eer1 et eer2) 'LEGE' 'NE' tdes1 'TITR' tit1 ;
  FINSI ;

** Sauvegarde des resultats de calcul Cast3M (reference pour MFront) au format .csv
  SI ISAUV ;
    str2 = '2D_axi_' ;
    fic1 = CHAI str1 str2 str3 '.csv' ;
    OPTI SORT fic1 ;
    SORT 'EXCE' ev1 'DIGI' 16 ;
  FINSI ;

  OPTI ECHO 0 ;
  SAUT 1 LIGN ;
  MESS ' ************ C A S  #4  :  2 D   A X I S Y M E T R I Q U E *************';
  SAUT 1 LIGN ;
  SI ((MAXI mer1 mer2) < 1.E-6) ;
    MESS ' Moy.int. Val.abs. Ecart relatif entre Calcul et Reference' ;
    MESS ' - phase 1.Traction' ' ' mer1 ;
    MESS ' - phase 2.Compression' ' ' mer2 ;
    MESS ' - maximum des 2 phases' ' ' (MAXI mer1 mer2) ' < 1.E-06 => OK' ;
    SAUT 1 LIGN ;
  SINO ;
    MESS ' Moy.int. Val.abs. Ecart relatif entre Calcul et Reference' ;
    MESS ' - phase 1.Traction' ' ' mer1 ;
    MESS ' - phase 2.Compression' ' ' mer2 ;
    MESS ' - maximum des 2 phases' ' ' (MAXI mer1 mer2) ' > 1.E-06 => ECHEC' ;
    IERR = VRAI ;
    SAUT 1 LIGN ;
  FINS ;
  SAUT 1 LIGN ;
  OPTI ECHO 1 ;
FINSI ;


*********** C A S  #5  :  2 D   P O U T R E   A   F I B R E ************
SI ((EXIS lcas 5) ET (EGA &BCALC 1)) ;

** Options generales
  OPTI 'DIME' 2 'MODE' 'PLAN' 'ELEM' 'QUA4' ;

** Maillage
  p1s     = (-0.5 * epai) (-0.5 * epai) ;
  p2s     = (-0.5 * epai) ( 0.5 * epai) ;
  l12s    = DROI 1 p1s p2s ;
  mails   = l12s TRAN 1 (epai 0.) ;
  p1      = 0. 0. ;
  p2      = long 0. ;
  mail    = DROI 1 p1 p2 ;
  mes1    = MESU mails ;
cadr1 = COUL ((-0.1 0.) ET (1. 0.)) 'BLAN' ;
rep1 = @REPERE (-0.2 -0.2) (PROG 0.2 0.2) 'TURQ' ;
SI ITRAC1 ;
  TRAC 'QUAL' (rep1 ET (mails COUL 'VERT') ET (mail COUL 'ROUG')) 'TITR' (CHAI str4 ' ' '[2D PaF] Maillages de la Poutre et de sa Section') ;
FINSI ;

** Modele et caracteristiques materiau (&BCALC : 1->Cast3M, 2->MFront)
SI (EGA &BCALC 1) ;
  mos = MODE mails 'MECANIQUE' 'ELASTIQUE' 'PLASTIQUE' 'MAZARS' 'QUAS' ;
  mas = MATE mos 'YOUN' you 'NU' nu 'KTR0' epd0 'ACOM' ac 'BCOM' bc 'ATRA' at 'BTRA' bt 'BETA' beta
                 'ALPY' 1. ;
  mo = MODE mail 'MECANIQUE' 'ELASTIQUE' 'SECTION' 'PLASTIQUE' 'SECTION' 'TIMO' ;
  ma = MATE mo 'MODS' mos 'MATS' mas ;
SINO ;
* Implémentation MFront A FAIRE. En attendant on quitte la boucle...
  QUIT BCALC;
FINSI ;

** Blocages
  blgauche = BLOQ 'DEPL' 'ROTA' p1 ;
  bldroite = BLOQ 'UX' p2 ;
  bl       = blgauche ET bldroite ;
  bldroit2 = BLOQ 'ROTA' p2 ;
  bl       = bl ET bldroit2 ;

** Chargements
  didroite = DEPI bldroite 1. ;
  ec1      = EVOL 'MANU' (PROG 0.  (0.5*inst_a)  inst_a  1.   )
                         (PROG 0.  utmax         0.      ucmax) ;
  cha      = CHAR 'DIMP' didroite ec1 ;

** Tracé des blocages et du chargement
  re0 = @REPERE (-0.2 -0.2) (PROG 0.2 0.2) ;
  mor = MODE re0 'MECANIQUE' 'BARR' ;
  mar = MATE mor 'YOUN' 1. 'NU' 1. 'SECT' 1. ;
  rir = RIGI mor mar ;
  vf  = VECT didroite 'FLX' ' ' 'ROUG' 0.1 ;
  SI ITRAC1 ;
    TRAC ((RIGI mo ma) ET blgauche ET rir) vf 'NOLE' 'TITR' (CHAI str4 ' ' '[2D PaF] Blocages et chargement') ;
  FINSI ;

** Resolution
  t                               = TABL ;
  t . 'MODELE'                    = mo ;
  t . 'CARACTERISTIQUES'          = ma ;
  t . 'BLOCAGES_MECANIQUES'       = bl ;
  t . 'CHARGEMENT'                = cha ;
  t . 'TEMPS_CALCULES'            = PROG 0. 'PAS' 3.E-3 (0.5*inst_a)
                                            'PAS' 3.E-3 inst_a
                                            'PAS' 1.E-2 1. ;
  t . 'MES_SAUVEGARDES'           = TABL ;
  t . 'MES_SAUVEGARDES' . 'DEFTO' = VRAI ;
  PASAPAS t ;

** Post traitement
* courbes : endommagement moyen vs temps
*           contrainte moyenne vs deformation moyenne
*           force de reaction vs deplacement impose
* evolutions temporelles a tous les points de Gauss
  ng = 4 ;
  tleg = TABL ;
  tleg . 1 = MOT 'MARQ CARR NOLI' ;
  tleg . 2 = MOT 'MARQ LOSA NOLI' ;
  tleg . 3 = MOT 'MARQ ROND NOLI' ;
  tleg . 4 = MOT 'MARQ ETOI NOLI' ;
  tleg . 'TITRE' = TABL ;
  REPE b ng ;
    tleg . 'TITRE' . &b = CHAI 'Cal_mat_' str3 '_Pt_Gauss' ' ' &b ;
  FIN b ;
  tleg . (ng+1) = MOT 'MARQ CROI REGU' ;
  tleg . 'TITRE' . (ng+1) = MOT 'Ref_Traction' ;
  tleg . (ng+2) = MOT 'MARQ PLUS REGU' ;
  tleg . 'TITRE' . (ng+2) = MOT 'Ref_Compression' ;
  tt = t . 'TEMPS' ;
  tv = t . 'VARIABLES_INTERNES' ;
  tu = t . 'DEPLACEMENTS' ;
  tr = t . 'REACTIONS' ;
  def0 = DEFO (cadr1 ET rep1 ET mail) (tu . 0) 0. ;
  ltps = PROG ;
  ltps_t = PROG ;
  ltps_c = PROG ;
  lend1 = PROG ;
  lend2 = PROG ;
  lend3 = PROG ;
  lend4 = PROG ;
  lsig1 = PROG ;
  lsig2 = PROG ;
  lsig3 = PROG ;
  lsig4 = PROG ;
  leps1 = PROG ;
  leps2 = PROG ;
  leps3 = PROG ;
  leps4 = PROG ;
  ldep = PROG ;
  lrea = PROG ;
  end_p = 0. ;
  REPE b0 (DIME tt) ;
    tps1 = tt . (&b0 - 1) ;
*   Liste des instants : globale (ltps) de traction (ltps_t) de compression (ltps_c)
    ltps = ltps ET tps1 ;
    SI (<EG tps1 inst_a) ;
      ltps_t = ltps_t ET tps1 ;
    SINON ;
      ltps_c = ltps_c ET tps1 ;
    FINSI ;
    SI (EGA &b0 1) ;
      lend1 = lend1 ET 0. ;
      lend2 = lend2 ET 0. ;
      lend3 = lend3 ET 0. ;
      lend4 = lend4 ET 0. ;
      lsig1 = lsig1 ET 0. ;
      lsig2 = lsig2 ET 0. ;
      lsig3 = lsig3 ET 0. ;
      lsig4 = lsig4 ET 0. ;
      leps1 = leps1 ET 0. ;
      leps2 = leps2 ET 0. ;
      leps3 = leps3 ET 0. ;
      leps4 = leps4 ET 0. ;
      end1 = 0. ;
    SINON ;
      lend1 = lend1 ET (EXTR (EXTR (tv . (&b0 - 1)) 'VAIS' 1 1 1) 'VHNI' 1 1 1) ;
      lend2 = lend2 ET (EXTR (EXTR (tv . (&b0 - 1)) 'VAIS' 1 1 1) 'VHNI' 1 1 2) ;
      lend3 = lend3 ET (EXTR (EXTR (tv . (&b0 - 1)) 'VAIS' 1 1 1) 'VHNI' 1 1 3) ;
      lend4 = lend4 ET (EXTR (EXTR (tv . (&b0 - 1)) 'VAIS' 1 1 1) 'VHNI' 1 1 4) ;
      lsig1 = lsig1 ET (EXTR (EXTR (tv . (&b0 - 1)) 'VONS' 1 1 1) 'SMXX' 1 1 1) ;
      lsig2 = lsig2 ET (EXTR (EXTR (tv . (&b0 - 1)) 'VONS' 1 1 1) 'SMXX' 1 1 2) ;
      lsig3 = lsig3 ET (EXTR (EXTR (tv . (&b0 - 1)) 'VONS' 1 1 1) 'SMXX' 1 1 3) ;
      lsig4 = lsig4 ET (EXTR (EXTR (tv . (&b0 - 1)) 'VONS' 1 1 1) 'SMXX' 1 1 4) ;
      leps1 = leps1 ET (EXTR (EXTR (tv . (&b0 - 1)) 'VAIS' 1 1 1) 'VISX' 1 1 1) ;
      leps2 = leps2 ET (EXTR (EXTR (tv . (&b0 - 1)) 'VAIS' 1 1 1) 'VISX' 1 1 2) ;
      leps3 = leps3 ET (EXTR (EXTR (tv . (&b0 - 1)) 'VAIS' 1 1 1) 'VISX' 1 1 3) ;
      leps4 = leps4 ET (EXTR (EXTR (tv . (&b0 - 1)) 'VAIS' 1 1 1) 'VISX' 1 1 4) ;
      end1 = EXTR (EXTR (tv . (&b0 - 1)) 'VAIS' 1 1 1) 'VHNI' 1 1 1 ;
    FINSI ;
    u1   = EXTR (tu . (&b0 - 1)) 'UX' p2 ;
    rea1 = EXTR (tr . (&b0 - 1)) 'FX' p1 ;
    ldep = ldep ET u1 ;
    lrea = lrea ET rea1 ;
*   Endommagement de transition traction-compression end_t
    dd1 = end1 - end_p ;
    SI ((> end1 0.) ET (EGA dd1 0.)) ;
      end_t = end1 ;
    SINON ;
    FINSI ;
    end_p = end1 ;
  FIN b0 ;
  ev0 = (EVOL 'ROUG' 'MANU' 'Temps' ltps 'D' lend1) ET (EVOL 'ROUG' 'MANU' 'Temps' ltps 'D' lend2) ET
        (EVOL 'ROUG' 'MANU' 'Temps' ltps 'D' lend3) ET (EVOL 'ROUG' 'MANU' 'Temps' ltps 'D' lend4) ;
  ev1 = (EVOL 'ROUG' 'MANU' 'EPXX'  leps1 'SMXX' lsig1) ET (EVOL 'ROUG' 'MANU' 'EPXX' leps2 'SMXX' lsig2) ET
        (EVOL 'ROUG' 'MANU' 'EPXX'  leps3 'SMXX' lsig3) ET (EVOL 'ROUG' 'MANU' 'EPXX' leps4 'SMXX' lsig4) ;
  ev2 = EVOL 'ROUG' 'MANU' 'UX' ldep 'FX' lrea ;
** Sol.Ana.Traction
  ltps_t =  ENLE (ENLE ltps_t (DIME ltps_t)) 1 ;
  nb1 = DIME ltps_t ;
  un1 = PROG nb1 * 1.D0 ;
  lepd01 = PROG nb1 * epd0 ;
  lat1 = PROG nb1 * at ;
* defo.unidim.
  lepu1 = (IPOL ltps_t ec1) / long ;
* defo.eq.Mazars (eps.tild) traction = defo.unidim.
  lepe1 = lepu1 ;
  dt = un1 - ((epd0*(un1-lat1)/lepe1) + (at*(EXP(bt*(lepd01-lepe1))))) ;
  lfiltr1 = LECT ;
  REPE b1 ;
    dt_i = EXTR dt &b1 ;
    SI (EGA &b1 1) ;
      dt_p = 0. ;
    FINSI ;
    ddt = dt_i - dt_p ;
    SI ((ddt < 0.) OU (dt_i < 0.) OU (dt_i > 1.)) ;
      lfiltr1 = lfiltr1 ET (LECT &b1) ;
    FINSI ;
    dt_p = dt_i ;
    SI (EGA &b1 (DIME dt)) ;
      QUIT b1 ;
    FINSI ;
  FIN b1 ;
  ltps_t = ENLE ltps_t lfiltr1 ;
  un1    = ENLE un1    lfiltr1 ;
  lepu1  = ENLE lepu1  lfiltr1 ;
  dt     = ENLE dt     lfiltr1 ;
  asig1 = (un1 - dt) * you * lepu1 ;
  an01 = EVOL 'TURQ' 'MANU' 'Temps' ltps_t 'D'    dt    ;
  tpst_t = IPOL end_t dt ltps_t ;
  an11 = EVOL 'TURQ' 'MANU' 'EPXX'  lepu1  'SMXX' asig1 ;
  sigt_t = IPOL tpst_t ltps_t asig1 ;
  epst_t = IPOL tpst_t ltps_t lepu1 ;

** Sol.Ana.Compression
  nb2 = DIME ltps_c ;
  un2 = PROG nb2 * 1.D0 ;
  lepd02 = PROG nb2 * epd0 ;
  lac2 = PROG nb2 * ac ;
* defo.unidim.
  lepu2 = (IPOL ltps_c ec1) / long ;
* defo.eq.Mazars (eps.tild) compression = racine(2)*nu*|defo.unidim.|
  lepe2 = (2.**0.5) * nu * (ABS lepu2) ;
  dc = un2 - ((epd0*(un2-lac2)/lepe2) + (ac*(EXP(bc*(lepd02-lepe2))))) ;
  lfiltr2 = LECT ;
  REPE b2 ;
    dc_i = EXTR dc &b2 ;
    SI (EGA &b2 1) ;
      dc_p = 1. ;
    FINSI ;
    ddc = dc_i - dc_p ;
    SI ((ddc < 0.) OU (dc_i < 0.) OU (dc_i > 1.)) ;
      lfiltr2 = lfiltr2 ET (LECT &b2) ;
    FINSI ;
    dc_p = dc_i ;
    SI (EGA &b2 (DIME dc)) ;
      QUIT b2 ;
    FINSI ;
  FIN b2 ;
  ltps_c = ENLE ltps_c lfiltr2 ;
  un2    = ENLE un2    lfiltr2 ;
  lepu2  = ENLE lepu2  lfiltr2 ;
  dc     = ENLE dc     lfiltr2 ;
  asig2 = (un2 - dc) * you * lepu2 ;
  an02 = EVOL 'TURQ' 'MANU' 'Temps' ltps_c 'D'    dc    ;
  tpsc_t = IPOL end_t dc ltps_c ;
  an12 = EVOL 'TURQ' 'MANU' 'EPXX'  lepu2  'SMXX' asig2 ;
  sigc_t = IPOL tpsc_t ltps_c asig2 ;
  epsc_t = IPOL tpsc_t ltps_c lepu2 ;
  SI ITRAC1 ;
    DESS (ev0 ET an01 ET an02) 'LEGE' 'SE' tleg 'TITR' (CHAI str4 ' ' '[2D PaF] Endommagement vs Temps') ;
    DESS (ev1 ET an11 ET an12) 'LEGE' 'NO' tleg 'TITR' (CHAI str4 ' ' '[2D PaF] Contrainte vs Deformation') ;
    DESS ev2 'TITR' (CHAI str4 ' ' '[2D PaF] Reaction vs Deplacement') 'LEGE' 'SE' tdess ;
  FINSI ;
* deformee
  REPE b3 (DIME tt) ;
    tps1 = tt . (&b3 - 1) ;
*   trace de la deformee (pour controle visuel)
    def1 = DEFO mail (tu . (&b3 - 1)) 33. 'ROUG' ;
    tit1 = CHAI str4 ' ' '[2D PaF] Deformee au temps' ' ' tps1 ;
    SI ITRAC1 ;
*      TRAC (def0 ET def1) 'TITR' tit1 ;
    FINSI ;
  FIN b3 ;
  SI ITRAC1 ;
    TRAC (def0 ET def1) 'TITR' tit1 ;
  FINSI ;
* comparaison Calcul / Reference sur la contrainte moyenne
*  Traction, courbes réduites
  lepu1_red = PROG ;
  asig1_red = PROG ;
  born_inf = EXTR lepu1 1 ;
  born_sup = epst_t ;
  REPE b_an11 (dime lepu1) ;
    xi = EXTR lepu1 &b_an11 ;
    yi = EXTR asig1 &b_an11 ;
    SI ((>EG xi born_inf) ET (<EG xi born_sup)) ;
      lepu1_red = lepu1_red et (PROG xi) ;
      asig1_red = asig1_red et (PROG yi) ;
    FINSI ;
  FIN b_an11 ;
  an11_red = EVOL 'TURQ' 'MANU' 'EPXX'  lepu1_red  'SMXX' asig1_red ;

  leps_red = PROG ;
  lsig_red = PROG ;
  ltps_red = PROG ;
  xp = 0. ;
  REPE b_ev1 (dime leps1) ;
    xi = EXTR leps1 &b_ev1 ;
    dx = xi - xp ;
    yi = EXTR lsig1 &b_ev1 ;
    ti = EXTR ltps &b_ev1 ;
    SI ((>EG xi born_inf) ET (<EG xi born_sup) ET (>EG dx 0)) ;
      leps_red = leps_red et (PROG xi) ;
      lsig_red = lsig_red et (PROG yi) ;
      ltps_red = ltps_red et (PROG ti) ;
    FINSI ;
    xp = xi ;
  FIN b_ev1 ;
  ev1_red = EVOL 'ROUG' 'MANU' 'EPXX'  leps_red 'SMXX' lsig_red ;

  lsiga_red = 'IPOL' an11_red leps_red ;
  ler1 = ABS (lsig_red - lsiga_red) / lsiga_red ;
  eer1 = EVOL 'ORAN' 'MANU' 'Temps'  ltps_red  'Ec.rel.SMXX' ler1 ;
  dtps = (EXTR ltps_red (DIME ltps_red)) - (EXTR ltps_red 1) ;
  mer1 = (INTG eer1) / dtps ;
  tit1 = CHAI str4 ' ' '[2D PaF] Ecart rel. |Calc.-Ref.|/Ref. en trac., Moy.int.|Ecart|' ' ' mer1 ;
  SI ITRAC1 ;
    DESS eer1 'TITR' tit1 ;
  FINSI ;

*  Compression, courbes réduites
  lepu2_red = PROG ;
  asig2_red = PROG ;
  born_inf = epsc_t ;
  born_sup = EXTR lepu2 (DIME lepu2) ;
  REPE b_an12 (dime lepu2) ;
    xi = EXTR lepu2 &b_an12 ;
    yi = EXTR asig2 &b_an12 ;
    SI ((<EG xi born_inf) ET (>EG xi born_sup)) ;
      lepu2_red = lepu2_red et (PROG xi) ;
      asig2_red = asig2_red et (PROG yi) ;
    FINSI ;
  FIN b_an12 ;
  an12_red = EVOL 'TURQ' 'MANU' 'EPXX'  lepu2_red  'SMXX' asig2_red ;

  leps_red = PROG ;
  lsig_red = PROG ;
  ltps_red = PROG ;
  xp = 0. ;
  REPE b_ev1 (dime leps1) ;
    xi = EXTR leps1 &b_ev1 ;
    dx = xi - xp ;
    yi = EXTR lsig1 &b_ev1 ;
    ti = EXTR ltps &b_ev1 ;
    SI ((<EG xi born_inf) ET (>EG xi born_sup)) ;
      leps_red = leps_red et (PROG xi) ;
      lsig_red = lsig_red et (PROG yi) ;
      ltps_red = ltps_red et (PROG ti) ;
    FINSI ;
    xp = xi ;
  FIN b_ev1 ;
  ev1_red = EVOL 'ROUG' 'MANU' 'EPXX'  leps_red 'SMXX' lsig_red ;

  lsiga_red = 'IPOL' an12_red leps_red ;
  ler2 = ABS ((lsig_red - lsiga_red) / lsiga_red) ;
  eer2 = EVOL 'ORAN' 'MANU' 'Temps'  ltps_red  '|Ec.rel|SMXX' ler2 ;
  dtps = (EXTR ltps_red (DIME ltps_red)) - (EXTR ltps_red 1) ;
  mer2 = (INTG eer2) / dtps ;
  tit2 = CHAI str4 ' ' '[2D PaF] Val.abs.Ec.rel.|(Calc-Ref)/Ref| en compr., Moy.int.|Ecart|' ' ' mer2 ;
  SI ITRAC1 ;
    DESS eer2 'TITR' tit2 ;
  FINSI ;
  tdes1 = 'TABLE' ;
  tdes1.'TITRE' = 'TABLE' ;
  tdes1 . 1 = MOT 'MARQ CROI' ;
  tdes1 . 'TITRE' . 1 = MOT 'Traction' ;
  tdes1 . 2 = MOT 'MARQ PLUS' ;
  tdes1 . 'TITRE' . 2 = MOT 'Compression' ;
  tit1 = CHAI str4 ' ' '[2D PaF] |Ec.r|, Moy.int.|Ec.r| en trac.' mer1 ' - compr.' mer2 ;
  SI ITRAC1 ;
    DESS (eer1 et eer2) 'LEGE' 'NE' tdes1 'TITR' tit1 ;
  FINSI ;
  OPTI ECHO 0 ;
  SAUT 1 LIGN ;
  MESS ' *********** C A S  #5  :  2 D   P O U T R E   A   F I B R E ************';
  SAUT 1 LIGN ;
  SI ((MAXI mer1 mer2) < 1.E-6) ;
    MESS ' Moy.int. Val.abs. Ecart relatif entre Calcul et Reference' ;
    MESS ' - phase 1.Traction' ' ' mer1 ;
    MESS ' - phase 2.Compression' ' ' mer2 ;
    MESS ' - maximum des 2 phases' ' ' (MAXI mer1 mer2) ' < 1.E-06 => OK' ;
    SAUT 1 LIGN ;
  SINO ;
    MESS ' Moy.int. Val.abs. Ecart relatif entre Calcul et Reference' ;
    MESS ' - phase 1.Traction' ' ' mer1 ;
    MESS ' - phase 2.Compression' ' ' mer2 ;
    MESS ' - maximum des 2 phases' ' ' (MAXI mer1 mer2) ' > 1.E-06 => ECHEC' ;
    IERR = VRAI ;
    SAUT 1 LIGN ;
  FINS ;
  SAUT 1 LIGN ;
  OPTI ECHO 1 ;
FINSI ;

** Sortie sur Erreur 1152 en cas de non conformite
SI IERR ;
  ERRE 1152 ;
  ERRE 5 ;
FINSI ;


FIN BCALC ;


FIN ;
